new load.UCMT_925b9b0c36c40a81729261a9dc27688c70e76a7ece05f2a1ca0dcbc7947e52ff phases=3 model=1 bus=84891355001992.1.2.3 kv=13.8 kw=112.0 daily=MT-Tipo4 vminpu=0.85
new load.UCMT_9e2e41b9e505b6417376c2f0f41f194dfa291f7ee6f9ec5897302831900bb123 phases=3 model=1 bus=80471645007257.1.2.3 kv=13.8 kw=112.0 daily=MT-Tipo2 vminpu=0.85
new load.UCMT_4194fac70d64f9b4ad32ca16472e00bda0676d7d336e3110590896158a9f7acb phases=3 model=1 bus=87251635001991.1.2.3 kv=13.8 kw=112.0 daily=MT-Tipo1 vminpu=0.85
new load.UCMT_b9358dd6714fd3b52835225bdf67480564c4e59fa4396171198e5cf51b963f8d phases=3 model=1 bus=85021265002413.1.2.3 kv=13.8 kw=75.0 daily=MT-Tipo8 vminpu=0.85
new load.UCMT_e1a1933e36c11ecbf0b92eec701bbf76c4f34e935a26bcc692ff09df0e582911 phases=3 model=1 bus=86998135001993.1.2.3 kv=13.8 kw=2750.0 daily=MT-Tipo7 vminpu=0.85
new load.UCMT_16500c075f8358f9260cf34c60e5e4aed30f73ac6250bf339cb2d6ace7c8cefe phases=3 model=1 bus=85965855001993.1.2.3 kv=13.8 kw=225.0 daily=MT-Tipo2 vminpu=0.85
new load.UCMT_54b794bd2c65b39a6024f923e658e8887668ac7bc1128c2a45b43e4143ebaad6 phases=3 model=1 bus=90897565002413.1.2.3 kv=13.8 kw=300.0 daily=MT-Tipo2 vminpu=0.85
new load.UCMT_75ddb8013093d9a5c29005422fd32a97af2ed3b1117b3235cabd4da7dffdec51 phases=3 model=1 bus=82368075002409.1.2.3 kv=13.8 kw=150.0 daily=MT-Tipo2 vminpu=0.85
new load.UCMT_81f35c01f8ad29ed0514386b48f50af5299c6a21bd43862e52dbd62e992ecf5d phases=3 model=1 bus=97549675007259.1.2.3 kv=13.8 kw=4000.0 daily=MT-Tipo7 vminpu=0.85
new load.UCMT_15639ce96a8df7718e3ad951a3520ad221944d14524894c72aae4d0f89a1584b phases=3 model=1 bus=85353535002412.1.2.3 kv=13.8 kw=225.0 daily=MT-Tipo8 vminpu=0.85
new load.UCMT_9e63c4603f75eebc239e0c8ad6329fff5f34adea68a188dc0e0cd5ac6a18843d phases=3 model=1 bus=86285525002228.1.2.3 kv=13.8 kw=150.0 daily=MT-Tipo2 vminpu=0.85
new load.UCMT_5467771b4d19438e6ca154d5cfa5101c35d1a08752d16558824c0b98c6ecebc1 phases=3 model=1 bus=86543955001993.1.2.3 kv=13.8 kw=225.0 daily=MT-Tipo7 vminpu=0.85
new load.UCMT_be8305fe49204b14b72444ae7ae9b4e118760ba5e48f921450fe1dff71ccc057 phases=3 model=1 bus=87054205001992.1.2.3 kv=13.8 kw=150.0 daily=MT-Tipo7 vminpu=0.85
new load.UCMT_abd04942f7e1a3072130425704bd81b62b06f3324921fa4207f06b42d329d15e phases=3 model=1 bus=87521215002410.1.2.3 kv=13.8 kw=225.0 daily=MT-Tipo9 vminpu=0.85
new load.UCMT_fdc56a472347b0ac69fd02b18d1988339e6bf25ca3c1a6e29667fd263c1addda phases=3 model=1 bus=86977465008497.1.2.3 kv=13.8 kw=112.0 daily=MT-Tipo4 vminpu=0.85
new load.UCMT_8a909d170288134c65ca58fd295d95f47f14a53aa0ac894aa651aed41d0e6a09 phases=3 model=1 bus=80438075001990.1.2.3 kv=13.8 kw=225.0 daily=MT-Tipo9 vminpu=0.85
new load.UCMT_08efdd4775532cddde3b38919190e690b30b126682280e4a9dd5df974865c937 phases=3 model=1 bus=86875835002410.1.2.3 kv=13.8 kw=300.0 daily=MT-Tipo4 vminpu=0.85
new load.UCMT_fb371db5707f15fea02ea4d22c2c9a87496a63c043b0b5df0c270299395708bd phases=3 model=1 bus=91150805001995.1.2.3 kv=13.8 kw=150.0 daily=MT-Tipo7 vminpu=0.85
new load.UCMT_6bf2d8ef0566734bac2782e7a265b80e469a8155aae4815bced84bf7030c6c3c phases=3 model=1 bus=87703025002414.1.2.3 kv=13.8 kw=150.0 daily=MT-Tipo7 vminpu=0.85
new load.UCMT_c3489f007090a6bb85064e7c65aa371631d5b53120ab15c535050c7ab6c79281 phases=3 model=1 bus=80547705008497.1.2.3 kv=13.8 kw=112.0 daily=MT-Tipo5 vminpu=0.85
new load.UCMT_9a9ae02aacc437f1b571155eeb2767d7b45dcbcc57336c1dd5ac3d751e5eac4b phases=3 model=1 bus=87158825008498.1.2.3 kv=13.8 kw=150.0 daily=MT-Tipo7 vminpu=0.85
new load.UCMT_a57d19caa9b69d5f7967f109ab81230987b2b5dd6e14fde0843bc7a3c9426108 phases=3 model=1 bus=80468475001993.1.2.3 kv=13.8 kw=112.0 daily=MT-Tipo8 vminpu=0.85
new load.UCMT_5f80241229db8fae3f2cf18a36afbbb602ac075e191575e9dee79cbf229c1df6 phases=3 model=1 bus=87173425008500.1.2.3 kv=13.8 kw=225.0 daily=MT-Tipo4 vminpu=0.85
new load.UCMT_673f6722961fdd2930e6abd7303caa3b38cc187138cb73612d182c2da39c2746 phases=3 model=1 bus=81758875007258.1.2.3 kv=13.8 kw=225.0 daily=MT-Tipo8 vminpu=0.85
new load.UCMT_461dc8e544e2043d83d739d9fb942dd27bccdd13f4de0b806651bb33897d78e3 phases=3 model=1 bus=87301575007258.1.2.3 kv=13.8 kw=112.0 daily=MT-Tipo6 vminpu=0.85
new load.UCMT_39ba4363e96ccd175688cc6556a9382f09745d35c89212c5ea89ab35140e7b96 phases=3 model=1 bus=87301535001996.1.2.3 kv=13.8 kw=225.0 daily=MT-Tipo8 vminpu=0.85
new load.UCMT_dca5f5f3e47252468f253857f9e30b6f6763c95d22530f7f90e9b5fb96227120 phases=3 model=1 bus=87301655001996.1.2.3 kv=13.8 kw=300.0 daily=MT-Tipo8 vminpu=0.85
new load.UCMT_43705f87f1bf04e934eac60435841747f7816b84625765de9e10d53bd79e7da9 phases=3 model=1 bus=87307075001993.1.2.3 kv=13.8 kw=2500.0 daily=MT-Tipo2 vminpu=0.85
new load.UCMT_393dc10045b46fefdcc8701e70142ccb33e335f254b019fb34de85de994dfd08 phases=3 model=1 bus=87229015001990.1.2.3 kv=13.8 kw=225.0 daily=MT-Tipo6 vminpu=0.85
new load.UCMT_47551b6c048912bd2d6743ef2f9eea265c61a7492abca4d1a8e43502c43150d7 phases=3 model=1 bus=87368205008497.1.2.3 kv=13.8 kw=112.0 daily=MT-Tipo7 vminpu=0.85
new load.UCMT_0348c4a5e8cd33bce63f6f4ddcd54fa1cdb8905e3a7c0e733669c63e9ef19b96 phases=3 model=1 bus=82580945002228.1.2.3 kv=13.8 kw=45.0 daily=MT-Tipo4 vminpu=0.85
new load.UCMT_90248f0555005f815f9ef5e643ffc915abc0c4895a42a4083fa349c87c87de5d phases=3 model=1 bus=87497835002148.1.2.3 kv=13.8 kw=225.0 daily=MT-Tipo2 vminpu=0.85
new load.UCMT_c82664db980103e96cdf3fcc034adabdf547877e88fa4d2a4e695c5b0c27edfb phases=3 model=1 bus=87522395002210.1.2.3 kv=13.8 kw=150.0 daily=MT-Tipo2 vminpu=0.85
new load.UCMT_aa00af9be206cb6d3b5acc03b12fe54245dd25fe2de4ccd9f65786e4596d8344 phases=3 model=1 bus=86967755001992.1.2.3 kv=13.8 kw=1000.0 daily=MT-Tipo4 vminpu=0.85
new load.UCMT_6e70419d7b51cce5b99184f005e2c4ea77c8034247abb70250de289391dc3f15 phases=3 model=1 bus=87570595001990.1.2.3 kv=13.8 kw=112.0 daily=MT-Tipo4 vminpu=0.85
new load.UCMT_a2121fff5024d24f226574fcf01f099da368a584c950bc61499538601be0ee0d phases=3 model=1 bus=85965855001993.1.2.3 kv=13.8 kw=225.0 daily=MT-Tipo8 vminpu=0.85
new load.UCMT_3448e77c29c77a818f6cc2e0ceba20624f243458dce5411977678ae47c1b6032 phases=3 model=1 bus=85889525008497.1.2.3 kv=13.8 kw=112.0 daily=MT-Tipo4 vminpu=0.85
new load.UCMT_cef37aa489f9c8b098113605b6b2d6b1054b1c17f2dde2f14691f4986bdc6a00 phases=3 model=1 bus=87842615002148.1.2.3 kv=13.8 kw=150.0 daily=MT-Tipo6 vminpu=0.85
new load.UCMT_1fefda45b545ef39386ab0a80d3a6b6cede64eeeabdaefb9bf513c73e6cae4d8 phases=3 model=1 bus=87710645002409.1.2.3 kv=13.8 kw=500.0 daily=MT-Tipo2 vminpu=0.85
new load.UCMT_371982f1c65f43d94b9fa9fb557e15e006328ae881d3762932cdf0f419db5ebf phases=3 model=1 bus=80446045001991.1.2.3 kv=13.8 kw=600.0 daily=MT-Tipo4 vminpu=0.85
new load.UCMT_d590dbd410679616c46c704bbd42ed1c23ce347b5933f61fd634ec02425b1cf9 phases=3 model=1 bus=87956035002148.1.2.3 kv=13.8 kw=150.0 daily=MT-Tipo2 vminpu=0.85
new load.UCMT_20be9476948a21cc440a509e557f0ad133ab44990b3b9f1e415333b13191c108 phases=3 model=1 bus=86263975001996.1.2.3 kv=13.8 kw=225.0 daily=MT-Tipo2 vminpu=0.85
new load.UCMT_5526aa6e368409d1693fb9522e00fcd3701357968b43eb064aea8edb75cf107e phases=3 model=1 bus=87998225002210.1.2.3 kv=13.8 kw=225.0 daily=MT-Tipo2 vminpu=0.85
new load.UCMT_28cf67f2f107e04fbab6e64dcc578e0391d35af225be020786e47fbcda5b0a08 phases=3 model=1 bus=88049745007257.1.2.3 kv=13.8 kw=225.0 daily=MT-Tipo8 vminpu=0.85
new load.UCMT_cab1f526928420aad8d80548c5dcb525f8a85d0e556050921b1a8d74f211bf41 phases=3 model=1 bus=88106925001995.1.2.3 kv=13.8 kw=150.0 daily=MT-Tipo8 vminpu=0.85
new load.UCMT_1ff4f03342c5d57f23207b1092f42e0bc6824c2307a4822a39e9315a2a77817a phases=3 model=1 bus=88101125007259.1.2.3 kv=13.8 kw=225.0 daily=MT-Tipo4 vminpu=0.85
new load.UCMT_a68dac45a6e0c2a99683c1ff6d264dd91ab7bcdd5720f83af9deb0092c877334 phases=3 model=1 bus=88110555002148.1.2.3 kv=13.8 kw=300.0 daily=MT-Tipo8 vminpu=0.85
new load.UCMT_f515ed8227634be78e747bda71a101f66a14c66d734eef6754cbf39fc2056ed8 phases=3 model=1 bus=88188575002412.1.2.3 kv=13.8 kw=150.0 daily=MT-Tipo2 vminpu=0.85
new load.UCMT_08d6bc2780bf6c79dff701aaff94e01d7ca73ecb79cc1ff8e55da752ffa5a952 phases=3 model=1 bus=91150805001995.1.2.3 kv=13.8 kw=150.0 daily=MT-Tipo4 vminpu=0.85
new load.UCMT_d53f587e19145a5980a5fd6113b277a4560fd607ee1b115669381184aca64bf3 phases=3 model=1 bus=88406705002210.1.2.3 kv=13.8 kw=112.0 daily=MT-Tipo2 vminpu=0.85
new load.UCMT_7f8c8acd1e7fe9232f9fc5aafda5bba8a468fc23b99766ab204352c09a534d3f phases=3 model=1 bus=88343565002210.1.2.3 kv=13.8 kw=300.0 daily=MT-Tipo6 vminpu=0.85
new load.UCMT_6a6a6727ba0a5d6ef8ccc2c4cd020be3511b848b1a797e9551de4000c45ef972 phases=3 model=1 bus=88162595002412.1.2.3 kv=13.8 kw=1750.0 daily=MT-Tipo6 vminpu=0.85
new load.UCMT_1ee7c63a13e616f2a56f0f79bd3e96430334d142dc8fb11e9a3084f0d5801b88 phases=3 model=1 bus=88426435002188.1.2.3 kv=13.8 kw=300.0 daily=MT-Tipo2 vminpu=0.85
new load.UCMT_2c4c21860aa370c42382be1da84a270a138f6839698151ed418d7c117606621b phases=3 model=1 bus=88617285001996.1.2.3 kv=13.8 kw=300.0 daily=MT-Tipo2 vminpu=0.85
new load.UCMT_81fe54b5b48503d42f2ffc548ac1ee19bbd8ca4cd2011fbfcd9f0c53feb062a2 phases=3 model=1 bus=88536335007257.1.2.3 kv=13.8 kw=150.0 daily=MT-Tipo8 vminpu=0.85
new load.UCMT_e2732f1f5dfe22857cb47a5c0e6c53367770107c80c7d0a0a0fc470a15cac518 phases=3 model=1 bus=84559845002413.1.2.3 kv=13.8 kw=150.0 daily=MT-Tipo2 vminpu=0.85
new load.UCMT_a7f0a3b6b67b118344dc0c0043dc2955bf624aab4af4102dcf777fade6ee7b86 phases=3 model=1 bus=90065945002414.1.2.3 kv=13.8 kw=300.0 daily=MT-Tipo8 vminpu=0.85
new load.UCMT_2dd65d50bddb40c6c30f905ee2088f3dd8d04ed8c400822e532c062920dc745e phases=3 model=1 bus=89170165002414.1.2.3 kv=13.8 kw=500.0 daily=MT-Tipo4 vminpu=0.85
new load.UCMT_5cca84c96c4a83fc375687333371b8b74b99d2cf83b42bb362331427c4928543 phases=3 model=1 bus=89099365001996.1.2.3 kv=13.8 kw=750.0 daily=MT-Tipo8 vminpu=0.85
new load.UCMT_eb2a5ce1ed980b11c7bee5a99dc593faa5d6673fd3935f0daa03924d89e2d240 phases=3 model=1 bus=89099495001991.1.2.3 kv=13.8 kw=225.0 daily=MT-Tipo8 vminpu=0.85
new load.UCMT_2263e6b43b142bc654813f67e458a8e2cc56a9dd226148903bc23a48b90d8066 phases=3 model=1 bus=89099685002228.1.2.3 kv=13.8 kw=225.0 daily=MT-Tipo10 vminpu=0.85
new load.UCMT_14a202d20a48ec7ef3b9f738e72f8ee47f558ea3b2fe3f6ab3a756b3346ce8d4 phases=3 model=1 bus=88745835002210.1.2.3 kv=13.8 kw=150.0 daily=MT-Tipo4 vminpu=0.85
new load.UCMT_87b9f0e8ea4a0f9dca67ac3f957d8f91de2edb90864d5e36385c38d7a9a80bf9 phases=3 model=1 bus=80533955002210.1.2.3 kv=13.8 kw=112.0 daily=MT-Tipo1 vminpu=0.85
new load.UCMT_f0a04d476497273bbdc4d49a317ecf0a23c16074d000aa4ef28eac9132a09cf3 phases=3 model=1 bus=88754235002210.1.2.3 kv=13.8 kw=150.0 daily=MT-Tipo4 vminpu=0.85
new load.UCMT_6d5762d3a8d720d9b3caf49568367014441a812d119ed389fd76b3f45fe5fae8 phases=3 model=1 bus=89176315002210.1.2.3 kv=13.8 kw=150.0 daily=MT-Tipo10 vminpu=0.85
new load.UCMT_1032443e52fe46bc44598f297fd94cd0beb9fa398b7f40eccbbdac7473c87f60 phases=3 model=1 bus=91138725001996.1.2.3 kv=13.8 kw=225.0 daily=MT-Tipo4 vminpu=0.85
new load.UCMT_9a897918107fb66b585491b43cd78b18674648d7ffe0764b842af6c9edaccb3d phases=3 model=1 bus=88835485002412.1.2.3 kv=13.8 kw=225.0 daily=MT-Tipo2 vminpu=0.85
new load.UCMT_e5d0dd4dd021594f7d2663a040e72be520177a6dd73c6fb4884152c2e6408676 phases=3 model=1 bus=88765725007258.1.2.3 kv=13.8 kw=2000.0 daily=MT-Tipo8 vminpu=0.85
new load.UCMT_98d3a9cacf1ed04a2c3617916bddab1015ac1af34178fc7aafb836764c1834d8 phases=3 model=1 bus=91147635001995.1.2.3 kv=13.8 kw=112.0 daily=MT-Tipo4 vminpu=0.85
new load.UCMT_92daba7c94a61b2eb119506fce93a4d46c29eed1c2bdeedf4da1eb118dd580ed phases=3 model=1 bus=89142545002413.1.2.3 kv=13.8 kw=112.0 daily=MT-Tipo4 vminpu=0.85
new load.UCMT_72aea94f52b0edba1a9255dc0ce529c0d48f1db1e4aa92ebbfae2fb996a31388 phases=3 model=1 bus=86285895002414.1.2.3 kv=13.8 kw=75.0 daily=MT-Tipo2 vminpu=0.85
new load.UCMT_a4567f76b0f8413f53bdc928c3aaa64bbf04781c5fb48694e5f5787bbc4fecf7 phases=3 model=1 bus=89177385002211.1.2.3 kv=13.8 kw=112.0 daily=MT-Tipo4 vminpu=0.85
new load.UCMT_e0cb2b8bab3d7460dc63d7eeb4e75f59eca1bf15878d526a9b1ab9c3b0b32ee4 phases=3 model=1 bus=89185375002211.1.2.3 kv=13.8 kw=112.0 daily=MT-Tipo4 vminpu=0.85
new load.UCMT_7aa0753a2fcd5b66555025c86eca581641db49415df22e667f100f09066715c8 phases=3 model=1 bus=89220295001992.1.2.3 kv=13.8 kw=225.0 daily=MT-Tipo8 vminpu=0.85
new load.UCMT_d991f83f0f87661c15e82cd2a6d56aeeb7a45dc10ade876ff5b8afbdb35a3d84 phases=3 model=1 bus=89181185002413.1.2.3 kv=13.8 kw=150.0 daily=MT-Tipo2 vminpu=0.85
new load.UCMT_f0737ae5b92338028781e546d1a68bbccce6a9912ef00ba90faf7a5d89c181e0 phases=3 model=1 bus=83935975002414.1.2.3 kv=13.8 kw=112.0 daily=MT-Tipo10 vminpu=0.85
new load.UCMT_9fa0ea6d654502701419ce07cd6fd6771d68f9872dd5766c8f9bd402f54ac8bf phases=3 model=1 bus=91184765002413.1.2.3 kv=13.8 kw=500.0 daily=MT-Tipo6 vminpu=0.85
new load.UCMT_125ed4fce92d5dbe6c6f82b023cd8101f76cba0dbfda0c8b7df897451f97d715 phases=3 model=1 bus=89178735008500.1.2.3 kv=13.8 kw=500.0 daily=MT-Tipo2 vminpu=0.85
new load.UCMT_663ae7760eaa3ea4277bf5fb5ad5dfc276d8ae7a5d5e2b9a96db9728ab8daac8 phases=3 model=1 bus=89356155002412.1.2.3 kv=13.8 kw=112.0 daily=MT-Tipo4 vminpu=0.85
new load.UCMT_cb0b8adca215ff6959889907e36dd18722365124c6b7474fd948e211f6e592bb phases=3 model=1 bus=89442335002413.1.2.3 kv=13.8 kw=112.0 daily=MT-Tipo4 vminpu=0.85
new load.UCMT_8680e5cfa4e9af9e060f9199b5c9f5ec2955e00e7c52a466ea3ceb5a6b056de6 phases=3 model=1 bus=89399745002210.1.2.3 kv=13.8 kw=112.0 daily=MT-Tipo4 vminpu=0.85
new load.UCMT_1b989296e8f6cdd0deea16f6c205029fb8817aa2aca8e88bbe939a5a1576af12 phases=3 model=1 bus=89458345002409.1.2.3 kv=13.8 kw=112.0 daily=MT-Tipo2 vminpu=0.85
new load.UCMT_abecb76b0fc5a5ae991a16c3d9541989a7935c33dad88d51f32230a79da0ec8f phases=3 model=1 bus=89845095001996.1.2.3 kv=13.8 kw=225.0 daily=MT-Tipo10 vminpu=0.85
new load.UCMT_1845b51effbb174da241d65bb5a79c05d6cb3c2f1020881f3532ace11c9a3880 phases=3 model=1 bus=89475795002409.1.2.3 kv=13.8 kw=112.0 daily=MT-Tipo8 vminpu=0.85
new load.UCMT_f325a0bf397b6aadf30a9d17e88bfd9e645b164d7fc45547be3bd826b7ddd275 phases=3 model=1 bus=80535625002210.1.2.3 kv=13.8 kw=500.0 daily=MT-Tipo6 vminpu=0.85
new load.UCMT_a46bbeaa0005f4c24a3e8a407e448e80f603b178fcabd5915467a1fd8c5e1637 phases=3 model=1 bus=89596615001992.1.2.3 kv=13.8 kw=500.0 daily=MT-Tipo6 vminpu=0.85
new load.UCMT_29fc10c9af166d48fdeeb4f5ed6805d14426ea9e51b06014d09009b4971de6fb phases=3 model=1 bus=88993395002210.1.2.3 kv=13.8 kw=1000.0 daily=MT-Tipo3 vminpu=0.85
new load.UCMT_d13720e683a2c9776e4ca1a9b533876947d4186714eddcba08d376cb78015f7c phases=3 model=1 bus=98381835001993.1.2.3 kv=13.8 kw=1000.0 daily=MT-Tipo2 vminpu=0.85
new load.UCMT_557c82a73d5e8d856cf05b6b81da7b4bd1fed00299c2e0b91eff5ef6936169fb phases=3 model=1 bus=80515605001998.1.2.3 kv=13.8 kw=500.0 daily=MT-Tipo2 vminpu=0.85
new load.UCMT_0feb8a23063c3fe7c859c548b003f056849c9bada344b26efc61aac6af7e6e23 phases=3 model=1 bus=80535625002210.1.2.3 kv=13.8 kw=500.0 daily=MT-Tipo4 vminpu=0.85
new load.UCMT_9f8b10697d795fa0eb77fd9731501a4b8a02751fab8d219ceb89905b975effa8 phases=3 model=1 bus=80485285001996.1.2.3 kv=13.8 kw=1750.0 daily=MT-Tipo6 vminpu=0.85
new load.UCMT_e20b95d4a28bccfb36d455c5e91be59765365131075da215a641c3a54ec837ab phases=3 model=1 bus=89864285002409.1.2.3 kv=13.8 kw=150.0 daily=MT-Tipo6 vminpu=0.85
new load.UCMT_019a59cfdfcf41bfa36ac7320cf5db775da629398cb2b4fb7351a27a7f1b6f85 phases=3 model=1 bus=86973305001991.1.2.3 kv=13.8 kw=300.0 daily=MT-Tipo2 vminpu=0.85
new load.UCMT_f4bba4d1c9c5a30a0974c4a8aa2c6e797e28bfd5d12d1e3636386a5f3ffed98c phases=3 model=1 bus=89177915002228.1.2.3 kv=13.8 kw=1112.0 daily=MT-Tipo6 vminpu=0.85
new load.UCMT_ef7620d92e9e08b6e255f8fa2e32c38cbdcb4dc7861a6ad30f871ff82bb6365f phases=3 model=1 bus=88970035001992.1.2.3 kv=13.8 kw=225.0 daily=MT-Tipo2 vminpu=0.85
new load.UCMT_7f16ab6298e92e7d05a7d1c7a963b34b804d781660c14e1803ec7eb2bb194d53 phases=3 model=1 bus=80444335001991.1.2.3 kv=13.8 kw=112.0 daily=MT-Tipo1 vminpu=0.85
new load.UCMT_73e1b229f80eb441893afabb7f98406f60d6b31d1dd8e82d667c484dfae44437 phases=3 model=1 bus=88013475001990.1.2.3 kv=13.8 kw=4500.0 daily=MT-Tipo7 vminpu=0.85
new load.UCMT_859881c179c5e3c405e11648a39fbb162aa5cd18efd84c68aaf2202302a05313 phases=3 model=1 bus=89727325008500.1.2.3 kv=13.8 kw=300.0 daily=MT-Tipo2 vminpu=0.85
new load.UCMT_a9049afa838a2f5e0f9d90b509362a24199e66480f7de6d1acb1065deba26e74 phases=3 model=1 bus=89814605001992.1.2.3 kv=13.8 kw=150.0 daily=MT-Tipo10 vminpu=0.85
new load.UCMT_f8f7b21b9f033badef08fc8b0dafb34a0fe65a1e64e1b220af89ca3ba862e5d4 phases=3 model=1 bus=88970035001992.1.2.3 kv=13.8 kw=225.0 daily=MT-Tipo6 vminpu=0.85
new load.UCMT_8a4e668983ea16788aeb50c87df2dbf5ef94066681772004ad331d61a7e9c47a phases=3 model=1 bus=80481915001995.1.2.3 kv=13.8 kw=300.0 daily=MT-Tipo3 vminpu=0.85
new load.UCMT_2aade1b575760ef8e45b0c8e88d34954f3825403db16fce13813ac22f1588f50 phases=3 model=1 bus=90065955002414.1.2.3 kv=13.8 kw=4000.0 daily=MT-Tipo6 vminpu=0.85
new load.UCMT_28137ac18e71d694e88c2003251108ed03b80a7d188c3c15256556e70740506d phases=3 model=1 bus=90067335002413.1.2.3 kv=13.8 kw=112.0 daily=MT-Tipo8 vminpu=0.85
new load.UCMT_e5e361a8a2ca0a40fac69083ed9181b90686bf8d444201a24695a6035485bb34 phases=3 model=1 bus=90204795008497.1.2.3 kv=13.8 kw=225.0 daily=MT-Tipo6 vminpu=0.85
new load.UCMT_22a31dd514e3d8e3a20715f956f4bf4b29b7835ed8742764d3b61c197c903f0e phases=3 model=1 bus=80546095008497.1.2.3 kv=13.8 kw=112.0 daily=MT-Tipo1 vminpu=0.85
new load.UCMT_0ca5863349eca8a537751a923b2bea5209621bf001a0c23db1500c7f695fa70f phases=3 model=1 bus=90148085001996.1.2.3 kv=13.8 kw=500.0 daily=MT-Tipo6 vminpu=0.85
new load.UCMT_3f1e4e0ef5e930811a77fea9827e6de38095e168b5c30a32b6ce16505c933aa1 phases=3 model=1 bus=90148085001996.1.2.3 kv=13.8 kw=500.0 daily=MT-Tipo10 vminpu=0.85
new load.UCMT_3164eeb1dd343b33a514febbacc705e9a1c5eeda734259aa14aeb591426bc227 phases=3 model=1 bus=90148085001996.1.2.3 kv=13.8 kw=500.0 daily=MT-Tipo10 vminpu=0.85
new load.UCMT_51821559181c33e0822cdce62a37be1c2b16e22a803da89729ef7c1c5d57c608 phases=3 model=1 bus=88343565002210.1.2.3 kv=13.8 kw=300.0 daily=MT-Tipo6 vminpu=0.85
new load.UCMT_027e7d59fdc9f7fd9b0ad57282e4ab5bf75496dc8036421f0b132245066e7056 phases=3 model=1 bus=90285945002211.1.2.3 kv=13.8 kw=300.0 daily=MT-Tipo6 vminpu=0.85
new load.UCMT_9138c2cf6d0d97476c60eab734160747510381d114ebcacb8cb3f764da84fb58 phases=3 model=1 bus=90220405002228.1.2.3 kv=13.8 kw=2000.0 daily=MT-Tipo6 vminpu=0.85
new load.UCMT_ba22dc045e0e1d8bd96e2c27f8b6cc6034970ce64be0737422638a208773890e phases=3 model=1 bus=90286295001998.1.2.3 kv=13.8 kw=500.0 daily=MT-Tipo3 vminpu=0.85
new load.UCMT_90c53f6f4bfca83a740b1dd689192d27607e498a39c062128600070667c16d72 phases=3 model=1 bus=97691725002210.1.2.3 kv=13.8 kw=112.0 daily=MT-Tipo2 vminpu=0.85
new load.UCMT_5bcaccd0f2c771aa7ea5e7f38e7c57fbeca573949b17159684ab65cf87a24da2 phases=3 model=1 bus=82371825002409.1.2.3 kv=13.8 kw=100.0 daily=MT-Tipo1 vminpu=0.85
new load.UCMT_207591f43daf8cbbe905ae8de1c8cca77138a4b97588c805919890e052b022a5 phases=3 model=1 bus=80438035001990.1.2.3 kv=13.8 kw=225.0 daily=MT-Tipo1 vminpu=0.85
new load.UCMT_672b644900f89b7671b4fed6128d60544058a537fe250a68e203963e445a1041 phases=3 model=1 bus=90384075007257.1.2.3 kv=13.8 kw=750.0 daily=MT-Tipo3 vminpu=0.85
new load.UCMT_d9cad298e35e3116819bbfa55987e2989d09015388207abaddb9a7f09f4bdac2 phases=3 model=1 bus=90429105007258.1.2.3 kv=13.8 kw=500.0 daily=MT-Tipo10 vminpu=0.85
new load.UCMT_afa2032635b99d847b5e5f917d8d9c1502ed520a08bff165ea9bf41f4a17eafb phases=3 model=1 bus=90426485002228.1.2.3 kv=13.8 kw=150.0 daily=MT-Tipo10 vminpu=0.85
new load.UCMT_b4d3ced1f1c0d55f2ba5447d77e80b8fe218c362f316a1f6c03287318d335119 phases=3 model=1 bus=90592005002412.1.2.3 kv=13.8 kw=150.0 daily=MT-Tipo6 vminpu=0.85
new load.UCMT_17049e011037c773c9d80d2ea545a1606dafbb3fd3c19615c4dc111e135bf75d phases=3 model=1 bus=90583285002410.1.2.3 kv=13.8 kw=225.0 daily=MT-Tipo6 vminpu=0.85
new load.UCMT_decf2da5e1b6b6f282af4fba941579eff3f33c511835ce4782e0d7415c594841 phases=3 model=1 bus=90552245001992.1.2.3 kv=13.8 kw=150.0 daily=MT-Tipo10 vminpu=0.85
new load.UCMT_b4650d7a94c51d0a12efb0e580e081fd25e607466ae6300fa68a376ca36eb778 phases=3 model=1 bus=90625215007258.1.2.3 kv=13.8 kw=225.0 daily=MT-Tipo3 vminpu=0.85
new load.UCMT_badc3d5facc2d284b5762b412777ef5a1867c6c38425c20974b9fbedfabf0b0c phases=3 model=1 bus=90606675002409.1.2.3 kv=13.8 kw=225.0 daily=MT-Tipo3 vminpu=0.85
new load.UCMT_818527ec728d823d71b5720a0982c6be7c6aab76c22905474146fa995b52f506 phases=3 model=1 bus=90599025001990.1.2.3 kv=13.8 kw=150.0 daily=MT-Tipo3 vminpu=0.85
new load.UCMT_2f7759866461bf31adf1f3a4bd2d54623788709e2354b34e797b2f0d495d78f1 phases=3 model=1 bus=90678245001991.1.2.3 kv=13.8 kw=225.0 daily=MT-Tipo10 vminpu=0.85
new load.UCMT_6539a39b6675a85894b89f2c7e924dfea74d988fc5ec99abb19a838e66210865 phases=3 model=1 bus=90599635001991.1.2.3 kv=13.8 kw=112.0 daily=MT-Tipo6 vminpu=0.85
new load.UCMT_05e4e7fb18d4d545fa3ffaf1720bdf8796bab0fd4e00e0ccf8c08bc2c7a2b446 phases=3 model=1 bus=90705325008497.1.2.3 kv=13.8 kw=225.0 daily=MT-Tipo6 vminpu=0.85
new load.UCMT_b305f5815dff37347b25f75f85eef64f9a4f83e1997c8b5400689d24ce2d23fc phases=3 model=1 bus=90705485002188.1.2.3 kv=13.8 kw=225.0 daily=MT-Tipo3 vminpu=0.85
new load.UCMT_e0fb4e8f12a7ade41066ae94bb84044cd6c89c4ea250af54b258e027b45c18b4 phases=3 model=1 bus=98381835001993.1.2.3 kv=13.8 kw=1000.0 daily=MT-Tipo6 vminpu=0.85
new load.UCMT_94c9a195851532f571d2e9e9249e0555eafda7a7881e45b1d35fbe1f6f16f604 phases=3 model=1 bus=98381835001993.1.2.3 kv=13.8 kw=1000.0 daily=MT-Tipo6 vminpu=0.85
new load.UCMT_33ebae0b99de53f012793f017037a3872ad47f77a106d6643b0ecfe269eb6e63 phases=3 model=1 bus=98381835001993.1.2.3 kv=13.8 kw=1000.0 daily=MT-Tipo6 vminpu=0.85
new load.UCMT_1ca5abb9b0e1a9a46c65a1621372084f32af8782f2072bdfffa354b4a62e17fe phases=3 model=1 bus=89692625002188.1.2.3 kv=13.8 kw=150.0 daily=MT-Tipo6 vminpu=0.85
new load.UCMT_e6917607bbb23e810c8cad7c5ae277e779fe2e590196c0393b73e9515b771d0d phases=3 model=1 bus=90739125001998.1.2.3 kv=13.8 kw=150.0 daily=MT-Tipo6 vminpu=0.85
new load.UCMT_deca8c7e6251ede4eb216a7589a09ae8bc58463a93a780fb8ce670aec127fa9c phases=3 model=1 bus=90883745001996.1.2.3 kv=13.8 kw=1000.0 daily=MT-Tipo6 vminpu=0.85
new load.UCMT_612b334f15320ebb392e3866f26df7cbc8f6d1cb67d315e3c1e46085403395f8 phases=3 model=1 bus=90883745001996.1.2.3 kv=13.8 kw=1000.0 daily=MT-Tipo6 vminpu=0.85
new load.UCMT_4e133abb6b73a68f96c00492162b01b4d296dd4f4491892ac424ad45806bc61e phases=3 model=1 bus=90863425001991.1.2.3 kv=13.8 kw=500.0 daily=MT-Tipo6 vminpu=0.85
new load.UCMT_8d26967f28e92625eab7a3d5418a5a145df71532b4b638f014bc66b7e76150f8 phases=3 model=1 bus=91659885002413.1.2.3 kv=13.8 kw=225.0 daily=MT-Tipo6 vminpu=0.85
new load.UCMT_4e15b4461d5e1bbe52e93faae6fb3afc2d60d94f7426e63ae044c1605d6a7f00 phases=3 model=1 bus=91063765007258.1.2.3 kv=13.8 kw=150.0 daily=MT-Tipo6 vminpu=0.85
new load.UCMT_650b1aa757e07f5a43d906252c49f8b5e8080c56bf82aa0ea01094a810f4883c phases=3 model=1 bus=91066595001990.1.2.3 kv=13.8 kw=7187.0 daily=MT-Tipo6 vminpu=0.85
new load.UCMT_b1de7de7677e648c93dfd91873a14ab8166ff4a8f399ef779c0488ca27477769 phases=3 model=1 bus=90975485001993.1.2.3 kv=13.8 kw=500.0 daily=MT-Tipo10 vminpu=0.85
new load.UCMT_bce680d811c394f9375ad565a6a11ffbcd00d24d3ef66c1dc628405348856204 phases=3 model=1 bus=82278545002413.1.2.3 kv=13.8 kw=3250.0 daily=MT-Tipo6 vminpu=0.85
new load.UCMT_5edfdc0d58d391e18f02d632b9a9eb3954a6357e00ff33415661396f917647b2 phases=3 model=1 bus=91218025002210.1.2.3 kv=13.8 kw=150.0 daily=MT-Tipo10 vminpu=0.85
new load.UCMT_36b345aaae21242de3bd320d62ac594059980e949487747de1f3716547b958d9 phases=3 model=1 bus=91113155001992.1.2.3 kv=13.8 kw=225.0 daily=MT-Tipo7 vminpu=0.85
new load.UCMT_8acd08ed95114a9a98fa903d0255e0adb1194ba25ab1576ba187400c1e036a4f phases=3 model=1 bus=91229055001992.1.2.3 kv=13.8 kw=225.0 daily=MT-Tipo6 vminpu=0.85
new load.UCMT_2462018af4b8ddd3083f87a8f5ffbe96352e5d64040aa80c7234e77fa20319f6 phases=3 model=1 bus=91194825002414.1.2.3 kv=13.8 kw=5500.0 daily=MT-Tipo3 vminpu=0.85
new load.UCMT_8010072dd8539a71bfaf7e18a3149fbe817cb64b2bb6907fd2cf7e55b6f0671a phases=3 model=1 bus=91511705007257.1.2.3 kv=13.8 kw=300.0 daily=MT-Tipo3 vminpu=0.85
new load.UCMT_c390ee9940443527128e6d4c14eac258ccfd91f6eb194e68c69b13fe0e1d7212 phases=3 model=1 bus=91613885001991.1.2.3 kv=13.8 kw=150.0 daily=MT-Tipo3 vminpu=0.85
new load.UCMT_241295525674dc00b113d9ef85766950547a336741415601884ba6d69a8bb78e phases=3 model=1 bus=91344975007257.1.2.3 kv=13.8 kw=500.0 daily=MT-Tipo3 vminpu=0.85
new load.UCMT_85e68e0a21babe3ae53782ab62ee8cc14d2095c76f7816669be2151560a742ea phases=3 model=1 bus=91344975007257.1.2.3 kv=13.8 kw=500.0 daily=MT-Tipo10 vminpu=0.85
new load.UCMT_14bfde8a9dcfbe98cbbac8ab630f3438ae08f47fca0ec4dd08d4d1c6cd040553 phases=3 model=1 bus=91247765002210.1.2.3 kv=13.8 kw=300.0 daily=MT-Tipo3 vminpu=0.85
new load.UCMT_542fbb4ae633ddc0d6db72449dfed369bdae14fb490b22a857fdcf328b2ec64d phases=3 model=1 bus=91659885002413.1.2.3 kv=13.8 kw=225.0 daily=MT-Tipo10 vminpu=0.85
new load.UCMT_cda3c6d8e57aa0fca25b72fc84147418e0d1145b72e564498ecc1560352d0b54 phases=3 model=1 bus=91982855002210.1.2.3 kv=13.8 kw=150.0 daily=MT-Tipo3 vminpu=0.85
new load.UCMT_78e351a2c6aa66d60faa8055173212c4f233a66d6b543bce58c9a2f5c6b777eb phases=3 model=1 bus=91982855002210.1.2.3 kv=13.8 kw=150.0 daily=MT-Tipo6 vminpu=0.85
new load.UCMT_514646b3c812c4425c88311bd276e02c7a322c999ebfd2d2549012f2e4aa4200 phases=3 model=1 bus=86998135001993.1.2.3 kv=13.8 kw=2750.0 daily=MT-Tipo10 vminpu=0.85
new load.UCMT_b278f66e08311b16ef2eb1568a01445fff8869800b3ae3a6eed39f9a0ea8cf59 phases=3 model=1 bus=92513105002410.1.2.3 kv=13.8 kw=500.0 daily=MT-Tipo10 vminpu=0.85
new load.UCMT_10c17d707711ba64406301486704e86b0a9f6700b2dced6fe77081817912ff16 phases=3 model=1 bus=92036645002413.1.2.3 kv=13.8 kw=750.0 daily=MT-Tipo10 vminpu=0.85
new load.UCMT_541393339afb63182e90981c8a15daedb439d03ea4041338a2881c2a544ba1fe phases=3 model=1 bus=93308415001995.1.2.3 kv=13.8 kw=1000.0 daily=MT-Tipo6 vminpu=0.85
new load.UCMT_e7909b010cb088c9f236e2ab4d86069d6f7a8e5047698d712a8c90e24ee0d96e phases=3 model=1 bus=92424105007257.1.2.3 kv=13.8 kw=500.0 daily=MT-Tipo3 vminpu=0.85
new load.UCMT_8d76e879e0c275d6045c965c5a05cfb58dcda04e76aa93728937d15f126bd1b1 phases=3 model=1 bus=98042805001993.1.2.3 kv=13.8 kw=2000.0 daily=MT-Tipo6 vminpu=0.85
new load.UCMT_9c05517a5ff676f037ab6b490da994fd6e7ab7b6e7fb95deb44538c165af67a4 phases=3 model=1 bus=92230985002211.1.2.3 kv=13.8 kw=500.0 daily=MT-Tipo6 vminpu=0.85
new load.UCMT_6f9079fcfedd74f049d6b9ee404df8d5a28ac79e3704c23782385dfd9c74a796 phases=3 model=1 bus=91244545007257.1.2.3 kv=13.8 kw=112.0 daily=MT-Tipo10 vminpu=0.85
new load.UCMT_f7dd58ae5a6f9166650393e06e2446949742c86cfbd5a2f6219c9f9fd1190509 phases=3 model=1 bus=92891685001993.1.2.3 kv=13.8 kw=75.0 daily=MT-Tipo10 vminpu=0.85
new load.UCMT_ea8e84dc6fba2c1d949bd9ae272960e857e8de412525b73f08ffb3b192c9a147 phases=3 model=1 bus=80501075001993.1.2.3 kv=13.8 kw=150.0 daily=MT-Tipo6 vminpu=0.85
new load.UCMT_435ce48e5070c1ee256448907508c68a85161140c24ccf64002eb8146b73dcbf phases=3 model=1 bus=80477255001991.1.2.3 kv=13.8 kw=150.0 daily=MT-Tipo6 vminpu=0.85
new load.UCMT_82d4bcd02aa8e4563c2ca94eb3fcfe7f48de6fcbc162db2de00bffd440e17d0a phases=3 model=1 bus=82278545002413.1.2.3 kv=13.8 kw=3250.0 daily=MT-Tipo3 vminpu=0.85
new load.UCMT_61b14a3e90dc4a3c6cbb243ff41fd63ad38a9fa9a2627cf1cde84583ae2e3fe8 phases=3 model=1 bus=80477455001991.1.2.3 kv=13.8 kw=225.0 daily=MT-Tipo3 vminpu=0.85
new load.UCMT_b05d531608bf3234b4ed79035dbea208d9a067077f6713294b97732e8135b9a1 phases=3 model=1 bus=94434055001998.1.2.3 kv=13.8 kw=300.0 daily=MT-Tipo6 vminpu=0.85
new load.UCMT_7163a31f9f96f2702974bdbbf58c486c66282118232ec6b77ff93a526d1c78b6 phases=3 model=1 bus=80500995001993.1.2.3 kv=13.8 kw=75.0 daily=MT-Tipo10 vminpu=0.85
new load.UCMT_1b0078385c2df5f6e34a9ee9a9bbcaaa71f0b7d0405bb515df91fa4365515da7 phases=3 model=1 bus=85302445001993.1.2.3 kv=13.8 kw=300.0 daily=MT-Tipo6 vminpu=0.85
new load.UCMT_5d3b5d50b157efccb95763a8435609e88f401b028f59cb7bd7c133837e41b46f phases=3 model=1 bus=93348595007259.1.2.3 kv=13.8 kw=225.0 daily=MT-Tipo6 vminpu=0.85
new load.UCMT_5cc7888f364ed94a5271448120e9cd8683525b89ad50bc81fdf7e92288c27a7b phases=3 model=1 bus=83132335002410.1.2.3 kv=13.8 kw=225.0 daily=MT-Tipo1 vminpu=0.85
new load.UCMT_5a51b76e4534d81190e09e092ff0c763d4857a5d4e78c5bfebd97d656c8961a2 phases=3 model=1 bus=93594285008498.1.2.3 kv=13.8 kw=300.0 daily=MT-Tipo6 vminpu=0.85
new load.UCMT_e9a019dd6ba9580f9e849f1093f990718d33e34a8524855314c6a66ee65bc907 phases=3 model=1 bus=91247765002210.1.2.3 kv=13.8 kw=300.0 daily=MT-Tipo6 vminpu=0.85
new load.UCMT_ede3c35720cb8ae5ca3eef289e2bf58b255c074855c97978fc993e625a69265f phases=3 model=1 bus=93594285008498.1.2.3 kv=13.8 kw=300.0 daily=MT-Tipo6 vminpu=0.85
new load.UCMT_fa4d0b8af47ff44fc541145a77a34cea2fb3179e203a8d9b62899ae1ff2253b3 phases=3 model=1 bus=93753555002148.1.2.3 kv=13.8 kw=112.0 daily=MT-Tipo6 vminpu=0.85
new load.UCMT_6d43d821f0370b3ae2e793cd031844407ac8b3e68526559f0440d5ed660b4e4c phases=3 model=1 bus=93746875002412.1.2.3 kv=13.8 kw=112.0 daily=MT-Tipo6 vminpu=0.85
new load.UCMT_8c71709bc33d5f2f728bdc22ad2c9794bda1a85678a319bad0b798ad97f1f891 phases=3 model=1 bus=93795565001992.1.2.3 kv=13.8 kw=150.0 daily=MT-Tipo10 vminpu=0.85
new load.UCMT_7cf1111ac434320536d4ba3f53aa4883c20b4176d0375792b4119c74e500b4aa phases=3 model=1 bus=93716595007258.1.2.3 kv=13.8 kw=150.0 daily=MT-Tipo10 vminpu=0.85
new load.UCMT_2081d4e603ec5e2bb653fe5337891aeff4350146fd2dabbbbb347591f8e1e5ac phases=3 model=1 bus=93893055002210.1.2.3 kv=13.8 kw=112.0 daily=MT-Tipo3 vminpu=0.85
new load.UCMT_00846f5321e6c175318ea8d0c34a5059a04b790a43c1e897575c27920f48d402 phases=3 model=1 bus=94219015002414.1.2.3 kv=13.8 kw=225.0 daily=MT-Tipo3 vminpu=0.85
new load.UCMT_737ba44400e00c9d649e6697e48f63cd0b5a2ccc4c13f26fe20dc796906371b0 phases=3 model=1 bus=95527215002210.1.2.3 kv=13.8 kw=112.0 daily=MT-Tipo3 vminpu=0.85
new load.UCMT_fe12f7980fe213d88e8c51b5a398f735d04fc513475f7ca7e93b33f83f1b92fa phases=3 model=1 bus=94196015002210.1.2.3 kv=13.8 kw=112.0 daily=MT-Tipo6 vminpu=0.85
new load.UCMT_0fdf6b2c5e81986b6c32df14f611624925348ecd05f71b0c0f30354228311f34 phases=3 model=1 bus=94419805002413.1.2.3 kv=13.8 kw=150.0 daily=MT-Tipo6 vminpu=0.85
new load.UCMT_329d7888f465b13b76c7ec60193ef7788e200ee7f5557ba3b0bf1cd5e6ebbaf7 phases=3 model=1 bus=94452775007257.1.2.3 kv=13.8 kw=112.0 daily=MT-Tipo3 vminpu=0.85
new load.UCMT_b5b7f77299e113d4563f4467ab0f545ade35d5692631450d3d251725614e68cd phases=3 model=1 bus=94361495002410.1.2.3 kv=13.8 kw=150.0 daily=MT-Tipo10 vminpu=0.85
new load.UCMT_dafa2d22b3f8dcab4c4b13ec53d7df0e31200df699bbcbb0b1acfaed548ffee6 phases=3 model=1 bus=94230485007258.1.2.3 kv=13.8 kw=750.0 daily=MT-Tipo10 vminpu=0.85
new load.UCMT_81e6f024ea7aa6f2dd53a4b258a35d349f7086052b4309eaa9d1c90d1aaa75a1 phases=3 model=1 bus=94615345007258.1.2.3 kv=13.8 kw=4000.0 daily=MT-Tipo10 vminpu=0.85
new load.UCMT_0425122fa6ef2119ff59c956d81d75ecb662116a99e3ceeb43b4e948ded876ba phases=3 model=1 bus=94529845001993.1.2.3 kv=13.8 kw=150.0 daily=MT-Tipo6 vminpu=0.85
new load.UCMT_79b443f706b941714e976ce31a69ed649d7fc66de7afa81c63ed35a9f58d0687 phases=3 model=1 bus=94998245002412.1.2.3 kv=13.8 kw=112.0 daily=MT-Tipo6 vminpu=0.85
new load.UCMT_b436477131fa660187df721e33b6ff7c41caa76f48b3b40b6477ca444a9c3579 phases=3 model=1 bus=95431535002210.1.2.3 kv=13.8 kw=225.0 daily=MT-Tipo10 vminpu=0.85
new load.UCMT_525e37c5f8184afdb8410d00a2ddbe975f919dc67ce779cf08bd4816b7e7220b phases=3 model=1 bus=95523225002412.1.2.3 kv=13.8 kw=112.0 daily=MT-Tipo10 vminpu=0.85
new load.UCMT_b957db17f79f9dc453b7f266e763050bd85038e4b131137176e369c4668e91cc phases=3 model=1 bus=95494175002412.1.2.3 kv=13.8 kw=112.0 daily=MT-Tipo10 vminpu=0.85
new load.UCMT_ea377494e5c124b77af4a1614cc5faf2ab8de58577d2e590fef85adfb0838013 phases=3 model=1 bus=95522975002409.1.2.3 kv=13.8 kw=150.0 daily=MT-Tipo6 vminpu=0.85
new load.UCMT_f9bec14ef94a22b74fac5d77867f86b75453a0647e1a3fa248cb8a0921d06f26 phases=3 model=1 bus=80485285001996.1.2.3 kv=13.8 kw=1750.0 daily=MT-Tipo6 vminpu=0.85
new load.UCMT_d234cdad0329f9bc563e4a954d66585959c3edd3929fb554804731304bc73c30 phases=3 model=1 bus=80485285001996.1.2.3 kv=13.8 kw=1750.0 daily=MT-Tipo10 vminpu=0.85
new load.UCMT_36ee206acdff14dcfb726826cc694770de947817e268535af189736323c27866 phases=3 model=1 bus=95696155001996.1.2.3 kv=13.8 kw=300.0 daily=MT-Tipo6 vminpu=0.85
new load.UCMT_abbb894a651e2e2c64407f6e56234a91733800c76a80475c36ea0bc4d18a476d phases=3 model=1 bus=95696055002412.1.2.3 kv=13.8 kw=150.0 daily=MT-Tipo3 vminpu=0.85
new load.UCMT_b8e2fc77772ccb6e8c23a23a80d41c8808f95a62620ab7e65ec82040b0d19b3b phases=3 model=1 bus=81762505002410.1.2.3 kv=13.8 kw=225.0 daily=MT-Tipo3 vminpu=0.85
new load.UCMT_61c3501a1c53b607b5d775be3fdc021d8534c7cf75d497b4ef96375d51b13a70 phases=3 model=1 bus=94505955001991.1.2.3 kv=13.8 kw=150.0 daily=MT-Tipo10 vminpu=0.85
new load.UCMT_38145879988120d00c5fbd1c29140bcfd4e45442f4f20a81e61faa1d886bb341 phases=3 model=1 bus=95745555002228.1.2.3 kv=13.8 kw=500.0 daily=MT-Tipo6 vminpu=0.85
new load.UCMT_57a818d049e0538195a0fa908c5fd3c7e5421d6063b1e9d8ba0be792600db5d1 phases=3 model=1 bus=96140085001990.1.2.3 kv=13.8 kw=300.0 daily=MT-Tipo10 vminpu=0.85
new load.UCMT_24897eeb9d07e33b8f6269199bcea666b0e087d34e9b44f991fe80a5b42408a8 phases=3 model=1 bus=96624255002210.1.2.3 kv=13.8 kw=150.0 daily=MT-Tipo3 vminpu=0.85
new load.UCMT_bf696412b7dd26b5fc56911bd80f3c862f6e12a6aedffb4bfd0a8f8d8b48b638 phases=3 model=1 bus=96801195007257.1.2.3 kv=13.8 kw=150.0 daily=MT-Tipo6 vminpu=0.85
new load.UCMT_6da94cd58406a552c2f9616b77d7f3e88929b0b8e99893019040b135e194f471 phases=3 model=1 bus=97161495002412.1.2.3 kv=13.8 kw=150.0 daily=MT-Tipo1 vminpu=0.85
new load.UCMT_5844517b6e6c7f29ea49ecbd6a97f62610f786e7f7bdd33f64b11f8ec014c992 phases=3 model=1 bus=97259155002210.1.2.3 kv=13.8 kw=150.0 daily=MT-Tipo7 vminpu=0.85
new load.UCMT_4f9c7798e859684779345a36b386f6758b46c4f498a8d89cbd28cea62f68437d phases=3 model=1 bus=97549675007259.1.2.3 kv=13.8 kw=4000.0 daily=MT-Tipo4 vminpu=0.85
new load.UCMT_c0c817ef2460ab12cc56e3f669a5e03122f239241ce6daff9a8c0c1959612e38 phases=3 model=1 bus=97869965007258.1.2.3 kv=13.8 kw=225.0 daily=MT-Tipo2 vminpu=0.85
new load.UCMT_4451f00a2970c5ee3d0207595717e5a094295fba655445a74185813f744f0896 phases=3 model=1 bus=97848035007259.1.2.3 kv=13.8 kw=150.0 daily=MT-Tipo10 vminpu=0.85
new load.UCMT_5ddaf51260aa4ef1ec80c549bfaa94b02d482583a8edaa5388f8b0afa3194dcb phases=3 model=1 bus=97613915001992.1.2.3 kv=13.8 kw=225.0 daily=MT-Tipo10 vminpu=0.85
new load.UCMT_57fddac3e822e2d825abc2acdd2d79181b1921f593b86a22bfe7773f129d2bb7 phases=3 model=1 bus=95527215002210.1.2.3 kv=13.8 kw=112.0 daily=MT-Tipo1 vminpu=0.85
new load.UCMT_817750731e7ce174399bae8fe9d0acd661f45da9739ae16b434677c65ae191df phases=3 model=1 bus=82581085002228.1.2.3 kv=13.8 kw=1000.0 daily=MT-Tipo1 vminpu=0.85
new load.UCMT_fc7ee48cbaf75082ad8f430da66b7338d1b4aa07be586f2cd152faf1a97914b9 phases=3 model=1 bus=80553705007258.1.2.3 kv=13.8 kw=112.0 daily=MT-Tipo1 vminpu=0.85
new load.UCMT_e9614631d96caa3b9c10c77b49e9e818f8f9dd6eaec0ab3098b10d2b88cc12e2 phases=3 model=1 bus=82578125002228.1.2.3 kv=13.8 kw=300.0 daily=MT-Tipo1 vminpu=0.85
new load.UCMT_c0893e4e1f6928b844961ca0ad06c4720a03f501a95fb1bd3aa4e1d7dbf0e1d1 phases=3 model=1 bus=80526805002413.1.2.3 kv=13.8 kw=500.0 daily=MT-Tipo1 vminpu=0.85
new load.UCMT_952f7434a70c93a4499774e4162a369facce3b4f8c87dbafae0dd4c783b1706c phases=3 model=1 bus=89970825007258.1.2.3 kv=13.8 kw=300.0 daily=MT-Tipo1 vminpu=0.85
new load.UCMT_9b67fe98c2d7cd021eb76ba106d234fc7e12068ee6983170d6abb2d4c1511f67 phases=3 model=1 bus=80545095008497.1.2.3 kv=13.8 kw=112.0 daily=MT-Tipo1 vminpu=0.85
new load.UCMT_04b4e89f0f98335698b2c2fca34cb87fc3eff9ea3663d2aa44e1728f23992fe5 phases=3 model=1 bus=81758875007258.1.2.3 kv=13.8 kw=225.0 daily=MT-Tipo1 vminpu=0.85
new load.UCMT_585477a6e1fbad439affaf7d139472ca4306f99f2651e23d683347154c280010 phases=3 model=1 bus=81753915007258.1.2.3 kv=13.8 kw=150.0 daily=MT-Tipo1 vminpu=0.85
new load.UCMT_184f0ad1bf2fa319f0548ce7692216bf5bb9f367905125bbd8c42002c33121e1 phases=3 model=1 bus=80546475008497.1.2.3 kv=13.8 kw=112.0 daily=MT-Tipo1 vminpu=0.85
new load.UCMT_6197d65604e6e439c92ba9d20df2d195d37af512c1a39330b919c05a11f1162b phases=3 model=1 bus=81762515007258.1.2.3 kv=13.8 kw=75.0 daily=MT-Tipo1 vminpu=0.85
new load.UCMT_c7d8385295219fe0315142e9ba73bab5697c61cc1d98bd076d0a67365610399e phases=3 model=1 bus=81754655002148.1.2.3 kv=13.8 kw=300.0 daily=MT-Tipo1 vminpu=0.85
new load.UCMT_7d4bca6fe10bc8db2acd9051f432878bd8c19cdb4e45510b6811ce6f234810da phases=3 model=1 bus=80552505007258.1.2.3 kv=13.8 kw=112.0 daily=MT-Tipo1 vminpu=0.85
new load.UCMT_28b55bc36afc17fc01b6d07cd2a3ab6b7eae5052f5f559c4d905fa7a266f9ab7 phases=3 model=1 bus=81763035002148.1.2.3 kv=13.8 kw=75.0 daily=MT-Tipo1 vminpu=0.85
new load.UCMT_93473a3d4e4fe8867f7bc8d42269789b72b392ee7baa5f38e83eae1bdbbdd858 phases=3 model=1 bus=91505275002410.1.2.3 kv=13.8 kw=225.0 daily=MT-Tipo1 vminpu=0.85
new load.UCMT_c37dcd8de2d90bfe200b537186db26d8033ba0c8b91fd203da55cb4cb1e3a0db phases=3 model=1 bus=80472745002410.1.2.3 kv=13.8 kw=150.0 daily=MT-Tipo1 vminpu=0.85
new load.UCMT_5313ff11d6eb2c6430e5192d2b998b6ef65945aaae00c43640e4128451ef3bba phases=3 model=1 bus=80472595001994.1.2.3 kv=13.8 kw=112.0 daily=MT-Tipo1 vminpu=0.85
new load.UCMT_4d04489ed17e01f3c12c9d8e2e01d615cf37f1eafac53ad2f7dbfe0e8f866c39 phases=3 model=1 bus=80550855002410.1.2.3 kv=13.8 kw=225.0 daily=MT-Tipo1 vminpu=0.85
new load.UCMT_fa341c9ef9c34c4658d5acdc6d1f015e0db3d9085e6c52853f83ed1b0d852dc9 phases=3 model=1 bus=82277195002413.1.2.3 kv=13.8 kw=300.0 daily=MT-Tipo1 vminpu=0.85
new load.UCMT_7c5770f7b18dea6706233abb18bd6f77814a69a9ff9f52afafb9dc7f1b3547cb phases=3 model=1 bus=80474495002410.1.2.3 kv=13.8 kw=300.0 daily=MT-Tipo1 vminpu=0.85
new load.UCMT_d24bc51e67d610b6744de339ea88bc8e1bbc65e8aaebb38003e90b0cacf94d00 phases=3 model=1 bus=82277235002413.1.2.3 kv=13.8 kw=500.0 daily=MT-Tipo1 vminpu=0.85
new load.UCMT_100256e8e3ac723ec204542a366ed37366dcc5e90e5d6e6de7c30eef2d69f890 phases=3 model=1 bus=88013475001990.1.2.3 kv=13.8 kw=4500.0 daily=MT-Tipo1 vminpu=0.85
new load.UCMT_29e85118f496172dff6b49a459f906c54d3a048e2644d13fd60a39a22db8a1b1 phases=3 model=1 bus=80472505001994.1.2.3 kv=13.8 kw=300.0 daily=MT-Tipo1 vminpu=0.85
new load.UCMT_3168f7ae2e4c5747516a04f7492f39e42ceda9f2523334e66ea13f4a7271410c phases=3 model=1 bus=80553255007258.1.2.3 kv=13.8 kw=150.0 daily=MT-Tipo1 vminpu=0.85
new load.UCMT_174eab11eb9afa2a9bc706d6f9ccbbe8ee5daa8b4f827ffa7a2f1bdf9ae458a7 phases=3 model=1 bus=83755595001995.1.2.3 kv=13.8 kw=1000.0 daily=MT-Tipo1 vminpu=0.85
new load.UCMT_50ccabf06d7876f67f1f2c647c0fc023064c401b2b1e9dd9362ed71c36c591f2 phases=3 model=1 bus=80504625007259.1.2.3 kv=13.8 kw=75.0 daily=MT-Tipo1 vminpu=0.85
new load.UCMT_cbe7c5ebe854facef6ee65cd42213f6e8852fa2eca997b8cc81c73df3afe1880 phases=3 model=1 bus=80480545001995.1.2.3 kv=13.8 kw=225.0 daily=MT-Tipo1 vminpu=0.85
new load.UCMT_1d8c5e9942f3e41d33f7e6ae609c8de02ece155bc0e2ef756f3392f4b0189e84 phases=3 model=1 bus=80473345002410.1.2.3 kv=13.8 kw=225.0 daily=MT-Tipo1 vminpu=0.85
new load.UCMT_cc82ee50abe47711feb1d64e8534e327c5583317edfbc5030424f02f4c257d02 phases=3 model=1 bus=92346405001995.1.2.3 kv=13.8 kw=150.0 daily=MT-Tipo1 vminpu=0.85
new load.UCMT_c4bcd0c7866329c4e3a60118736a25e26efbe490be2272c7c1905ff72ea64d9a phases=3 model=1 bus=80480775001995.1.2.3 kv=13.8 kw=112.0 daily=MT-Tipo1 vminpu=0.85
new load.UCMT_3ed17edfd0ae520dadc3cb41f37e697b42bae70cc8f4b8a0803ec333f5da65a5 phases=3 model=1 bus=80492785001992.1.2.3 kv=13.8 kw=800.0 daily=MT-Tipo1 vminpu=0.85
new load.UCMT_7e170ba25a16fb3706614c1019841b0f6086095e8d02c53b22e82da2852859b9 phases=3 model=1 bus=80444665001991.1.2.3 kv=13.8 kw=150.0 daily=MT-Tipo1 vminpu=0.85
new load.UCMT_50e11fac26b49f90e4a16db3dafab603ef7e7e765ef1615d7219b2838bcdce70 phases=3 model=1 bus=80522245001995.1.2.3 kv=13.8 kw=75.0 daily=MT-Tipo1 vminpu=0.85
new load.UCMT_cd1f5cdfb5257b07711d79f8be5e08e72c0b0b9c4530a8d15c9597f236b532ff phases=3 model=1 bus=80546495008497.1.2.3 kv=13.8 kw=75.0 daily=MT-Tipo1 vminpu=0.85
new load.UCMT_884f499f8ba6cca7fd561e91970941a6dc9d307b60b31134211f835d4217895c phases=3 model=1 bus=80546875008497.1.2.3 kv=13.8 kw=225.0 daily=MT-Tipo1 vminpu=0.85
new load.UCMT_fd51431613af62d8c3c634b5df0032cee7989b7c38f3286faae15a7926ca7b03 phases=3 model=1 bus=80480815001995.1.2.3 kv=13.8 kw=75.0 daily=MT-Tipo1 vminpu=0.85
new load.UCMT_466c045d4f283a36f5666c0dd08426f9531f94ea7d2f84720e29300c6394aca7 phases=3 model=1 bus=82279855002413.1.2.3 kv=13.8 kw=112.0 daily=MT-Tipo1 vminpu=0.85
new load.UCMT_04fbdefa31ec8fb9b26e5dcc7232d993170e121ec34e4633ff1ce60fd3478158 phases=3 model=1 bus=80527285001995.1.2.3 kv=13.8 kw=150.0 daily=MT-Tipo1 vminpu=0.85
new load.UCMT_f937f2062fcc707c701881f183670a1ae952480c3a70f6beb027e71f89858672 phases=3 model=1 bus=80472285001993.1.2.3 kv=13.8 kw=112.0 daily=MT-Tipo1 vminpu=0.85
new load.UCMT_2232da96f078fd16a7022f8a3ff94430fd3d03350c5b34401a7b6bee53c0222a phases=3 model=1 bus=80541395008497.1.2.3 kv=13.8 kw=112.0 daily=MT-Tipo1 vminpu=0.85
new load.UCMT_e723c017b4dafff67b44295586a98e0bc128afd874edd00f49d8c33b80c2a526 phases=3 model=1 bus=80543285008497.1.2.3 kv=13.8 kw=1000.0 daily=MT-Tipo1 vminpu=0.85
new load.UCMT_52ec652e4c2020ab3718e6a861a7f5a4f2da964d192dd34acf7c86656114caac phases=3 model=1 bus=82275885002413.1.2.3 kv=13.8 kw=112.0 daily=MT-Tipo1 vminpu=0.85
new load.UCMT_22c36b8cd1b51968258c807671d48184ed7daa620417f3000f5f92dd670c313b phases=3 model=1 bus=82281285002413.1.2.3 kv=13.8 kw=750.0 daily=MT-Tipo1 vminpu=0.85
new load.UCMT_397e71f671e2e3c5377bf336054fbc74025140c747ad6bc2b953c09cb281db2b phases=3 model=1 bus=80486505001992.1.2.3 kv=13.8 kw=225.0 daily=MT-Tipo1 vminpu=0.85
new load.UCMT_50ef616e0f46ce0a01b2f1cb60dab496ee4749a3962f6f9f464fabb42b2093c2 phases=3 model=1 bus=80485345001992.1.2.3 kv=13.8 kw=112.0 daily=MT-Tipo1 vminpu=0.85
new load.UCMT_38fea93709524005bf8eb98ea0f5bf6c3170ae4b9f7d8ac687249287a6f84d15 phases=3 model=1 bus=96196545002413.1.2.3 kv=13.8 kw=1112.0 daily=MT-Tipo1 vminpu=0.85
new load.UCMT_7f396e4aebd8586baf3bff69fe721a4115caa12d8ab5cf7f440121891f37c1cf phases=3 model=1 bus=84500275007258.1.2.3 kv=13.8 kw=500.0 daily=MT-Tipo1 vminpu=0.85
new load.UCMT_7789d9c3555022b4d7f2ce6b9b13fd744e39292d9688eff6bed998307300c883 phases=3 model=1 bus=80440965008500.1.2.3 kv=13.8 kw=112.0 daily=MT-Tipo1 vminpu=0.85
new load.UCMT_938a259b90b96b243b0f38010c6a9044a998484eba91e071bf9f065af4c9d5a2 phases=3 model=1 bus=94893325001991.1.2.3 kv=13.8 kw=300.0 daily=MT-Tipo1 vminpu=0.85
new load.UCMT_ebc99a3ef9385f706422221e45f563765d89c7814504185bfd93edd4ba54651c phases=3 model=1 bus=83176745002148.1.2.3 kv=13.8 kw=225.0 daily=MT-Tipo1 vminpu=0.85
new load.UCMT_01e8595b04bd5baa897af1279e5cd36852b01ee48fa1158819396b58020483ec phases=3 model=1 bus=80436255001990.1.2.3 kv=13.8 kw=75.0 daily=MT-Tipo1 vminpu=0.85
new load.UCMT_f59789acc86e9284335e4c1c2bfe5ebe02068a945a141746b9e9ffdb75621fe4 phases=3 model=1 bus=82291105002211.1.2.3 kv=13.8 kw=112.0 daily=MT-Tipo1 vminpu=0.85
new load.UCMT_af4631fc50ad5f4b75774be07810cfa64faf9f8a0aeb0b80d4843f78e92bce92 phases=3 model=1 bus=81763665002410.1.2.3 kv=13.8 kw=225.0 daily=MT-Tipo1 vminpu=0.85
new load.UCMT_c09cc13378f61dec9eb1ed78efd7732057240034ec9ff29cc0ebde93dcf70854 phases=3 model=1 bus=88001795002228.1.2.3 kv=13.8 kw=75.0 daily=MT-Tipo1 vminpu=0.85
new load.UCMT_b8ff76494a9b26d867c6fdba5b0567a2796a83350527c1ceff8b87833099be9b phases=3 model=1 bus=82580995002228.1.2.3 kv=13.8 kw=225.0 daily=MT-Tipo1 vminpu=0.85
new load.UCMT_de260c221b2fd0d35cb11c3e6f50a61bb03a49bd4704333e7906be360c4490fc phases=3 model=1 bus=84546375002210.1.2.3 kv=13.8 kw=1000.0 daily=MT-Tipo1 vminpu=0.85
new load.UCMT_7d5ed532294b8d7d3d9cb75c39d4ef99e3c985caf4a350caf73e73209966f0a5 phases=3 model=1 bus=80547975008497.1.2.3 kv=13.8 kw=1000.0 daily=MT-Tipo1 vminpu=0.85
new load.UCMT_873da69cd6b9b433ed7e3eb6a62ab2570855fe9c820903f755c1ce5b8bad2ddc phases=3 model=1 bus=80536485002210.1.2.3 kv=13.8 kw=225.0 daily=MT-Tipo1 vminpu=0.85
new load.UCMT_65591e157900595e83caa4734982123838e3c2662b2781a57218995e8cf5b35b phases=3 model=1 bus=80536525002210.1.2.3 kv=13.8 kw=112.0 daily=MT-Tipo1 vminpu=0.85
new load.UCMT_c7b84a555461441693a7d545ab5c7695d4321f20ad5da31bdc51440b47d3bbe0 phases=3 model=1 bus=80499245001996.1.2.3 kv=13.8 kw=225.0 daily=MT-Tipo1 vminpu=0.85
new load.UCMT_06c68885e9015d4e25d5e1ba4565746d2a21170eae35f4aa62c8f29db9f9637b phases=3 model=1 bus=82569525002228.1.2.3 kv=13.8 kw=150.0 daily=MT-Tipo1 vminpu=0.85
new load.UCMT_1ce60a6cedfd80a018e143ec6a01f3f18ae7d3a268f7a1e10f4a8dcd347fed0d phases=3 model=1 bus=92001575002410.1.2.3 kv=13.8 kw=500.0 daily=MT-Tipo1 vminpu=0.85
new load.UCMT_14fe4110b09d2b8266406f1aefe77c6ec62dcfe8cc80d0c55877feb78389bfe2 phases=3 model=1 bus=80472615001994.1.2.3 kv=13.8 kw=150.0 daily=MT-Tipo1 vminpu=0.85
new load.UCMT_a3c2b43775c6ecf11ff2e6940ac26d99cb1f23d2aa952e906545b5dd69aca811 phases=3 model=1 bus=89090725001994.1.2.3 kv=13.8 kw=800.0 daily=MT-Tipo1 vminpu=0.85
new load.UCMT_656a1f7dc636bd1d2166a67d688d230d4c92511c6836fd18fdf4bba5272bbbbc phases=3 model=1 bus=80474675002410.1.2.3 kv=13.8 kw=75.0 daily=MT-Tipo1 vminpu=0.85
new load.UCMT_6188cf691b7c3367c8f74759df8f40ad47adc6c3fe3ec691a1b419401aa868cc phases=3 model=1 bus=82570695002228.1.2.3 kv=13.8 kw=1500.0 daily=MT-Tipo1 vminpu=0.85
new load.UCMT_7833673d30ba6c5171797866800c6224f4cc3bb424a0b67248ee4b23ef59c967 phases=3 model=1 bus=82568715002228.1.2.3 kv=13.8 kw=1793.0 daily=MT-Tipo1 vminpu=0.85
new load.UCMT_f53baf3e833fcb9f81bad58e91698bd00cb39617f8d4f964c406773a11cc9bf3 phases=3 model=1 bus=80473485001994.1.2.3 kv=13.8 kw=225.0 daily=MT-Tipo1 vminpu=0.85
new load.UCMT_a0222329738407f596c673d1669019aca65f304e56b0046c086386ba3b9820d2 phases=3 model=1 bus=81764335007258.1.2.3 kv=13.8 kw=224.0 daily=MT-Tipo1 vminpu=0.85
new load.UCMT_f7ad5b84ee450b2fe163c8272aad585416315df70d12a8a9c0756dd8d586f1e5 phases=3 model=1 bus=94536905002148.1.2.3 kv=13.8 kw=1500.0 daily=MT-Tipo1 vminpu=0.85
new load.UCMT_29a200e0a9521fd7e165efb0121c5887b763c47653671c2929703cf1ba518ac2 phases=3 model=1 bus=81755035002148.1.2.3 kv=13.8 kw=1000.0 daily=MT-Tipo1 vminpu=0.85
new load.UCMT_e14df17d783c8cabe2ef6adec5f1540706619c49501d1db6fbf34807738eaed6 phases=3 model=1 bus=86001745002412.1.2.3 kv=13.8 kw=225.0 daily=MT-Tipo1 vminpu=0.85
new load.UCMT_1b13553f6b2e1d7a1159014a86e2bbc1975e234cd219ec91ddf316a47aed6eea phases=3 model=1 bus=80519365007259.1.2.3 kv=13.8 kw=1500.0 daily=MT-Tipo1 vminpu=0.85
new load.UCMT_db4fac90d577d9e8fa0f35bd1d24bcadd78407f384e8d13c0f70081cc4ce58c2 phases=3 model=1 bus=80551655002410.1.2.3 kv=13.8 kw=1000.0 daily=MT-Tipo1 vminpu=0.85
new load.UCMT_28d5756e2a2229c05a1820f9d3b3fcdad7c8002adbbcc5ca263d969ae3e5efe5 phases=3 model=1 bus=91101955002410.1.2.3 kv=13.8 kw=225.0 daily=MT-Tipo1 vminpu=0.85
new load.UCMT_4e90a533baa30ae76e923e55466d928cf4ebc91d0fc32e74fc4400dc0c64874b phases=3 model=1 bus=80499245001996.1.2.3 kv=13.8 kw=225.0 daily=MT-Tipo1 vminpu=0.85
new load.UCMT_f78ed300e7121c7c4de3c34f235f1833e5d4a93a8c22fb8c7b49869d07517629 phases=3 model=1 bus=82278205002413.1.2.3 kv=13.8 kw=75.0 daily=MT-Tipo1 vminpu=0.85
new load.UCMT_6cb434f3c60c6a2cfdbf4b43055e976f92b423cb550b34dfd37d0b539aefaef2 phases=3 model=1 bus=81754905002148.1.2.3 kv=13.8 kw=112.0 daily=MT-Tipo1 vminpu=0.85
new load.UCMT_29da9309d8f6651e0e6617e432e3cc8b6aa61713ea651fdb78f586d3977ef22a phases=3 model=1 bus=80485285001996.1.2.3 kv=13.8 kw=1750.0 daily=MT-Tipo1 vminpu=0.85
new load.UCMT_9dfaf20c1d99ee09d86ec50e66cd5aef47b1a10135f0b9b9795d405bdbe677fb phases=3 model=1 bus=81767605002148.1.2.3 kv=13.8 kw=150.0 daily=MT-Tipo1 vminpu=0.85
new load.UCMT_115ab1386af1b81ca0af564e19d741c2b281462526d24a12c17d5f169c9e160e phases=3 model=1 bus=98381835001993.1.2.3 kv=13.8 kw=1000.0 daily=MT-Tipo1 vminpu=0.85
new load.UCMT_e2e8808ba24a77e9faeb1e4ff1a597f88c2bcbd43d826a58781d3d981a96a2e5 phases=3 model=1 bus=98381835001993.1.2.3 kv=13.8 kw=1000.0 daily=MT-Tipo1 vminpu=0.85
new load.UCMT_06e8fcef2464ca1a2e9775dd8a800521838c9cabbe077a8a6208fa414d15bc0f phases=3 model=1 bus=82198775002188.1.2.3 kv=13.8 kw=1000.0 daily=MT-Tipo1 vminpu=0.85
new load.UCMT_0d2a242437b21af42d72a8c8c942fcfca4a67d20007bad276b533cf65342e7ff phases=3 model=1 bus=80446415001991.1.2.3 kv=13.8 kw=750.0 daily=MT-Tipo1 vminpu=0.85
new load.UCMT_046d1492c35eba93ae23a02599b6f0a49d28007fd07d82b5eaefeb1981480230 phases=3 model=1 bus=90200825002409.1.2.3 kv=13.8 kw=300.0 daily=MT-Tipo1 vminpu=0.85
new load.UCMT_473a60f3c8e7e57be5aa94cdba78497070f95de073d880439110895c1cc44a84 phases=3 model=1 bus=80533385002210.1.2.3 kv=13.8 kw=112.0 daily=MT-Tipo1 vminpu=0.85
new load.UCMT_5afb99bcb7a6fef33d3d1ce912b3b245039cf18e135e65c8e75abc7fd87f9448 phases=3 model=1 bus=80522115001995.1.2.3 kv=13.8 kw=112.0 daily=MT-Tipo1 vminpu=0.85
new load.UCMT_d24145fbcf5a57af4d8aadb7713843fee6f4fa0b7aae47165fd48ac2df66909d phases=3 model=1 bus=80551065002410.1.2.3 kv=13.8 kw=300.0 daily=MT-Tipo1 vminpu=0.85
new load.UCMT_1ac399336fc1837a4332d440ff9871f5da1fc5311bf7f5a9c428ae8d77e9107c phases=3 model=1 bus=82581085002228.1.2.3 kv=13.8 kw=1000.0 daily=MT-Tipo1 vminpu=0.85
new load.UCMT_de834fc44d1b90aa6b92e6b872f088a5e2903424b1531f843311c113b1298983 phases=3 model=1 bus=81753875007258.1.2.3 kv=13.8 kw=112.0 daily=MT-Tipo1 vminpu=0.85
new load.UCMT_108b7b473e3e40b0ae138f142f68e908b12d73daf467b41a2160af815c8e1710 phases=3 model=1 bus=90384075007257.1.2.3 kv=13.8 kw=750.0 daily=MT-Tipo1 vminpu=0.85
new load.UCMT_003f7e9df11d210df48dd1ac5a7a904733e7ebac6fbb662ec4311ccca2b35c30 phases=3 model=1 bus=80446885001991.1.2.3 kv=13.8 kw=225.0 daily=MT-Tipo1 vminpu=0.85
new load.UCMT_efc8f8de7e943a95924228a9b54a0add56d62259f0fe8fa29585c807f437f7aa phases=3 model=1 bus=81756345002410.1.2.3 kv=13.8 kw=225.0 daily=MT-Tipo1 vminpu=0.85
new load.UCMT_0b047b37df5396daebaac6d73faf12874d8f72dcb8b7fdaa67ced777111cd01a phases=3 model=1 bus=80446965001991.1.2.3 kv=13.8 kw=75.0 daily=MT-Tipo1 vminpu=0.85
new load.UCMT_5560b594658e624dbcd0e04e15b8414b969a5821c4e190682949e5a359fadf62 phases=3 model=1 bus=80480485001995.1.2.3 kv=13.8 kw=225.0 daily=MT-Tipo1 vminpu=0.85
new load.UCMT_3bcd7a11903fc26c79570647db26dd50254e58f98122d0c4802da592a0917331 phases=3 model=1 bus=80447645001991.1.2.3 kv=13.8 kw=150.0 daily=MT-Tipo1 vminpu=0.85
new load.UCMT_f59e232ceb9ed8e50d50c90d18c3d41ea85f57a51cb614aeca7f476b47f1068b phases=3 model=1 bus=81315205001991.1.2.3 kv=13.8 kw=600.0 daily=MT-Tipo1 vminpu=0.85
new load.UCMT_d41cde10ce6a162bdcd1379fd7e77ecfe943dc522666cae46b6299186db6909c phases=3 model=1 bus=80446275001991.1.2.3 kv=13.8 kw=75.0 daily=MT-Tipo1 vminpu=0.85
new load.UCMT_40d60f7da9820ebc97500df0696c9e4a931f04a6b3389cd8288cadf121244d8d phases=3 model=1 bus=92377585001991.1.2.3 kv=13.8 kw=150.0 daily=MT-Tipo1 vminpu=0.85
new load.UCMT_6f94a9af7438e836d9411c9bf97f225f7caac61a730adf144c1e1219bd6c5dd7 phases=3 model=1 bus=80476815001991.1.2.3 kv=13.8 kw=225.0 daily=MT-Tipo1 vminpu=0.85
new load.UCMT_ad5270d15225622db5c6dafec2a09061f28ed2f536f3337a2851f741c6854ee0 phases=3 model=1 bus=80447245001991.1.2.3 kv=13.8 kw=150.0 daily=MT-Tipo1 vminpu=0.85
new load.UCMT_f5f2a0bf92cf67c22ffb88fa2f7c7456d8a780bd97cb7285c7e34b8b4a4da3c2 phases=3 model=1 bus=80446415001991.1.2.3 kv=13.8 kw=750.0 daily=MT-Tipo1 vminpu=0.85
new load.UCMT_0e44bb9cbbcc5e84c95235765727b786b01bd7e36decef80ec2daa64f856027b phases=3 model=1 bus=80445335001991.1.2.3 kv=13.8 kw=500.0 daily=MT-Tipo1 vminpu=0.85
new load.UCMT_9d055e3296d763c33fe7decad4534f218cd13274be54d7d3b7eb9216c3066cca phases=3 model=1 bus=94230315001991.1.2.3 kv=13.8 kw=75.0 daily=MT-Tipo1 vminpu=0.85
new load.UCMT_4b1243fd4ff2d4cecc3d61463cc53d5d9605f2a71670c48e347658fa400d87d7 phases=3 model=1 bus=80475625001991.1.2.3 kv=13.8 kw=112.0 daily=MT-Tipo1 vminpu=0.85
new load.UCMT_1b6fc170e5dfc613c2029c927e3caa269a1ecf26d61ee11ff16f48fdd01ebdcf phases=3 model=1 bus=80446075001991.1.2.3 kv=13.8 kw=225.0 daily=MT-Tipo1 vminpu=0.85
new load.UCMT_14df16b7ac36d1e735d544e00a83bd2bdf22924d66b5ed13d375a618e1c115b4 phases=3 model=1 bus=80478555001991.1.2.3 kv=13.8 kw=750.0 daily=MT-Tipo1 vminpu=0.85
new load.UCMT_1a3b08ee16d60bba88f07c0c6abf78d9d400e27a86a2940b989cdc3bc972cf04 phases=3 model=1 bus=80447325001991.1.2.3 kv=13.8 kw=450.0 daily=MT-Tipo1 vminpu=0.85
new load.UCMT_2bfe17b34d95a6ec86f0ee2dbd932f7ad3e34f9fe92a1552a0309c9a5b75c004 phases=3 model=1 bus=83130035001991.1.2.3 kv=13.8 kw=450.0 daily=MT-Tipo1 vminpu=0.85
new load.UCMT_71a02cc55570fadbe68e2af71a5c7f360aa0716f7bb2fa45625efcb792cfbbcb phases=3 model=1 bus=80447325001991.1.2.3 kv=13.8 kw=450.0 daily=MT-Tipo1 vminpu=0.85
new load.UCMT_9a0cf0612af0a1f8fb481bc63bd711183028d2593d96b3713ce8ba42ee994a73 phases=3 model=1 bus=80477845001991.1.2.3 kv=13.8 kw=500.0 daily=MT-Tipo1 vminpu=0.85
new load.UCMT_bde6c46f7a30a76f57f02fb028e3728dade33fda3fcbd7c33f4edd5a80da703f phases=3 model=1 bus=80447485001991.1.2.3 kv=13.8 kw=500.0 daily=MT-Tipo1 vminpu=0.85
new load.UCMT_21847d5a7454bc38d36750be69fcc5a96781be8efcaaeec0911fd30b11e33b15 phases=3 model=1 bus=80475595001991.1.2.3 kv=13.8 kw=1600.0 daily=MT-Tipo1 vminpu=0.85
new load.UCMT_9fd52f73ed7a5102d8faf9713f524a9582cefc1e3651c36cea1614b161152c58 phases=3 model=1 bus=80446315001991.1.2.3 kv=13.8 kw=150.0 daily=MT-Tipo1 vminpu=0.85
new load.UCMT_2200e19507ac0b66251c095822c5e8003b3be14d22d794600f395999acb0861e phases=3 model=1 bus=80538765001992.1.2.3 kv=13.8 kw=112.0 daily=MT-Tipo1 vminpu=0.85
new load.UCMT_1826c3da654bf794b63eade242d6e06dd4ebe3bb3aa698e58b81a9ffdb80e5a5 phases=3 model=1 bus=86998235007259.1.2.3 kv=13.8 kw=150.0 daily=MT-Tipo1 vminpu=0.85
new load.UCMT_d5f1615ff1c2f7072ed7788a1d0832bc0570b1fe9ea28f740611491138123f83 phases=3 model=1 bus=82309445002211.1.2.3 kv=13.8 kw=150.0 daily=MT-Tipo1 vminpu=0.85
new load.UCMT_b288319e8f635b7bc778f799e4452505c30a8e522254aff6e6cd4ab554dbe702 phases=3 model=1 bus=82579745002228.1.2.3 kv=13.8 kw=500.0 daily=MT-Tipo1 vminpu=0.85
new load.UCMT_a52d01eddf0c984cdb339129bbe9c0a308a1746e5de7b8fc1fa7b3129f9e1b74 phases=3 model=1 bus=80551425007258.1.2.3 kv=13.8 kw=150.0 daily=MT-Tipo1 vminpu=0.85
new load.UCMT_e170899790fd9e0608cf1f3ed578ee8ec59878e1c8a0618ed44013aaa9dbde39 phases=3 model=1 bus=96016585002210.1.2.3 kv=13.8 kw=300.0 daily=MT-Tipo1 vminpu=0.85
new load.UCMT_a673fb232c7b11ca717a36c46bc3c642d3417a680112bdf8c1619e061d42eca9 phases=3 model=1 bus=80480135001995.1.2.3 kv=13.8 kw=112.0 daily=MT-Tipo1 vminpu=0.85
new load.UCMT_21a81e8115b6b3c1f6b17def1f5e06625e42f38e1191f34281d3de65cb10596c phases=3 model=1 bus=80531855002210.1.2.3 kv=13.8 kw=225.0 daily=MT-Tipo1 vminpu=0.85
new load.UCMT_b8d37ea4a4c4b2d08b7d05ae9a0d5a3d7386f831053f626d1565ade9b7a78361 phases=3 model=1 bus=80547975008497.1.2.3 kv=13.8 kw=1000.0 daily=MT-Tipo1 vminpu=0.85
new load.UCMT_2e83fa8d9b3d8aadc8cc65656dab5a2c59b9b3743b9805569cbba6df20e80c6f phases=3 model=1 bus=80443745001991.1.2.3 kv=13.8 kw=150.0 daily=MT-Tipo1 vminpu=0.85
new load.UCMT_125e29a326c115d9ca88dc30819b5c5c1bb93d670534b88157c227c717adf747 phases=3 model=1 bus=80536585002210.1.2.3 kv=13.8 kw=150.0 daily=MT-Tipo1 vminpu=0.85
new load.UCMT_fe6aa455fff9112fdec6e21a748febd9a638accd3b989c0c08024316c34c4d53 phases=3 model=1 bus=82276565002413.1.2.3 kv=13.8 kw=112.0 daily=MT-Tipo1 vminpu=0.85
new load.UCMT_05c0143f8bb7d91dff07efe5c5721b12b95a96673be71ed491e89f9e7460a406 phases=3 model=1 bus=80526925001995.1.2.3 kv=13.8 kw=150.0 daily=MT-Tipo1 vminpu=0.85
new load.UCMT_fdceb0d910324b9cf93e761cc30c9f60792c69de8af774b3f16f63698f65e0bd phases=3 model=1 bus=82201095002188.1.2.3 kv=13.8 kw=75.0 daily=MT-Tipo1 vminpu=0.85
new load.UCMT_cffdf9a0aaa77a526fcb67bc98d8a41b0624a8692812e8801c7fea51c1d20279 phases=3 model=1 bus=82293955002211.1.2.3 kv=13.8 kw=112.0 daily=MT-Tipo1 vminpu=0.85
new load.UCMT_cd48458e636b5f65d4cb69371758f6101c82758e2cb5e9abe07b12a0c72d7a47 phases=3 model=1 bus=82274735002413.1.2.3 kv=13.8 kw=150.0 daily=MT-Tipo1 vminpu=0.85
new load.UCMT_79ce4d5e12b4b55636790da84a06bca02a4c9d64eb8b8870a70572ba1e51bc38 phases=3 model=1 bus=80476815001991.1.2.3 kv=13.8 kw=225.0 daily=MT-Tipo1 vminpu=0.85
new load.UCMT_779820d994addf2251e991c7f2435789d7ffed15249285e5ffbe0670b575d4a9 phases=3 model=1 bus=80481705001995.1.2.3 kv=13.8 kw=225.0 daily=MT-Tipo1 vminpu=0.85
new load.UCMT_851e36473d18d87a58f134bea362d818ce953f5424e84f2e5e16ad7c2579f265 phases=3 model=1 bus=84645545001996.1.2.3 kv=13.8 kw=75.0 daily=MT-Tipo1 vminpu=0.85
new load.UCMT_7c477fdc8e242f19235aeac5f62b30bf3116216d3e9fa34ecdabe9e7d913e64d phases=3 model=1 bus=82211705002188.1.2.3 kv=13.8 kw=75.0 daily=MT-Tipo1 vminpu=0.85
new load.UCMT_c2517fd2501f43e3f2677c6f3b86ef2d8b22579d1525f387d61931cc096c3b14 phases=3 model=1 bus=81754715002148.1.2.3 kv=13.8 kw=525.0 daily=MT-Tipo1 vminpu=0.85
new load.UCMT_5fe884c27ede610020b823c030c476136e49930176c0c5d8d524793f473a2307 phases=3 model=1 bus=80457565002412.1.2.3 kv=13.8 kw=225.0 daily=MT-Tipo1 vminpu=0.85
new load.UCMT_500f874099c5ba928d63e73678659357296fba802d4f50b70b4646ba6a7a47b5 phases=3 model=1 bus=80468085001993.1.2.3 kv=13.8 kw=500.0 daily=MT-Tipo1 vminpu=0.85
new load.UCMT_9fe78a570349958f4e90b3ab3b39be0350279e8d3671a148a51256e878857e09 phases=3 model=1 bus=80444495001991.1.2.3 kv=13.8 kw=300.0 daily=MT-Tipo1 vminpu=0.85
new load.UCMT_ab9901df5c0c3e406c9ccd72db981acfac238195059e016d58bfc34787e06649 phases=3 model=1 bus=81760505007258.1.2.3 kv=13.8 kw=75.0 daily=MT-Tipo1 vminpu=0.85
new load.UCMT_d4e4b244402b31ae412c39f4e54e35d39a8b000796ea0481e297dc430addcdf5 phases=3 model=1 bus=82276915002413.1.2.3 kv=13.8 kw=112.0 daily=MT-Tipo1 vminpu=0.85
new load.UCMT_53224869db7fe96cfab7b3e78fd6ff9faf9f5491f330b63c677447583474b43d phases=3 model=1 bus=82378575002409.1.2.3 kv=13.8 kw=150.0 daily=MT-Tipo1 vminpu=0.85
new load.UCMT_ee4068214c86200c4714e21fe076f9509fc4c097ee39d8ce241925bd18a58286 phases=3 model=1 bus=80546185008497.1.2.3 kv=13.8 kw=150.0 daily=MT-Tipo1 vminpu=0.85
new load.UCMT_2916cce118a9ca387977489ba592a3d15d1820495fc2bbf34d5cd7004ed158ed phases=3 model=1 bus=81753785007258.1.2.3 kv=13.8 kw=750.0 daily=MT-Tipo1 vminpu=0.85
new load.UCMT_8ad34f8039abbbc74d2ac959f91a60867180d079f990759300ad6ec8b00e84ab phases=3 model=1 bus=82283355002211.1.2.3 kv=13.8 kw=112.0 daily=MT-Tipo1 vminpu=0.85
new load.UCMT_5cefe006934465e0bd552472f005ec3b1a3af3d035e8f47a3b894b9aca786b1e phases=3 model=1 bus=80499305001996.1.2.3 kv=13.8 kw=150.0 daily=MT-Tipo1 vminpu=0.85
new load.UCMT_b59c0c34a6e48c04828b6710a7e58bcf21ba251a0d82c32c75387c8bfb321dfa phases=3 model=1 bus=80499335001996.1.2.3 kv=13.8 kw=112.0 daily=MT-Tipo1 vminpu=0.85
new load.UCMT_ec667cd1e10190bb5ae7b14a3bfc4d270d55aeae4504ace76c103bd5a1341be9 phases=3 model=1 bus=93215435001991.1.2.3 kv=13.8 kw=300.0 daily=MT-Tipo1 vminpu=0.85
new load.UCMT_e26cb8be6e124d718126cc5ea9bba7421d267030122c2489e301131c31a12ae2 phases=3 model=1 bus=82338895002414.1.2.3 kv=13.8 kw=75.0 daily=MT-Tipo1 vminpu=0.85
new load.UCMT_bf3df7e093f7053e05ba87df3612daf97f764b4cf5e34649a174e010278ba43b phases=3 model=1 bus=82579295002228.1.2.3 kv=13.8 kw=300.0 daily=MT-Tipo1 vminpu=0.85
new load.UCMT_d6bc97069208b81ad4a1eebe38ecd101cb47cdb76de29ef9167f439b9206e2cd phases=3 model=1 bus=83059935002409.1.2.3 kv=13.8 kw=5000.0 daily=MT-Tipo1 vminpu=0.85
new load.UCMT_66138cf2fd00bce6addb3c533d9d6ca4a80dc59d3895265ef52a339e31009aa3 phases=3 model=1 bus=94528485001991.1.2.3 kv=13.8 kw=2000.0 daily=MT-Tipo5 vminpu=0.85
new load.UCMT_f5edf2ffe3da9e2be8a3c47711b4208e7810f3fb0a7338c4e8aa0f7029124271 phases=3 model=1 bus=82278545002413.1.2.3 kv=13.8 kw=3250.0 daily=MT-Tipo1 vminpu=0.85
new load.UCMT_2dcbb5646dcef13655c673ed658d000dc5194a6647eede1148c7697581305ecf phases=3 model=1 bus=80544445008497.1.2.3 kv=13.8 kw=1000.0 daily=MT-Tipo1 vminpu=0.85
new load.UCMT_e64894af264dbb98a4181eaf19445d6ba1198870b3fe16ad3063b8868a26e771 phases=3 model=1 bus=79659305002412.1.2.3 kv=13.8 kw=1500.0 daily=MT-Tipo5 vminpu=0.85
new load.UCMT_f7dfa2c2ccaeb61561ae6fb39a2e9704ab19c3b9558794745007ccf33a1ff05f phases=3 model=1 bus=81753965007258.1.2.3 kv=13.8 kw=112.0 daily=MT-Tipo1 vminpu=0.85
new load.UCMT_f69f993359e1ea60f8a95a9124a95712e958385222f7fd0ff8ffaa1d082d6df6 phases=3 model=1 bus=83106955002211.1.2.3 kv=13.8 kw=225.0 daily=MT-Tipo1 vminpu=0.85
new load.UCMT_736ca057ca427c29b55cac7cae30a1a282cb36b11221601c9b12a5d3039424e9 phases=3 model=1 bus=82325495002414.1.2.3 kv=13.8 kw=112.0 daily=MT-Tipo1 vminpu=0.85
new load.UCMT_deaebc2c4de789487c626009ee137cf2d9aa81ebf7d238991b2b0621fa39296f phases=3 model=1 bus=81762195002410.1.2.3 kv=13.8 kw=112.0 daily=MT-Tipo1 vminpu=0.85
new load.UCMT_6c67d285b60cb85f1f14cb5293dc33a80f33261f037bbf74b7b0da49721cbb7e phases=3 model=1 bus=81762505002410.1.2.3 kv=13.8 kw=225.0 daily=MT-Tipo1 vminpu=0.85
new load.UCMT_83007cdf61b745fba14bb03fc3a6dc0e72b13865730052426e75d281168a428c phases=3 model=1 bus=81758155002148.1.2.3 kv=13.8 kw=75.0 daily=MT-Tipo1 vminpu=0.85
new load.UCMT_6d073d2f2189fc3ce31e91307b0a71e818c40647b01259acc7577f00ab98ebd8 phases=3 model=1 bus=82578445002228.1.2.3 kv=13.8 kw=500.0 daily=MT-Tipo5 vminpu=0.85
new load.UCMT_be44d24676eb49dd0a7e935443fe10a78c2bccb5f8cb1e36df46a4934b1e982d phases=3 model=1 bus=82201135002188.1.2.3 kv=13.8 kw=45.0 daily=MT-Tipo5 vminpu=0.85
new load.UCMT_2089f4a50a4715f15bb963e4501a4a785c3e19bd07e2cd2d8cc6638de26be881 phases=3 model=1 bus=82578305001990.1.2.3 kv=13.8 kw=150.0 daily=MT-Tipo1 vminpu=0.85
new load.UCMT_37746425259506099aaae7d3dbb768a75f6a9a6dd0164108aa2776d701396314 phases=3 model=1 bus=82286635002211.1.2.3 kv=13.8 kw=75.0 daily=MT-Tipo1 vminpu=0.85
new load.UCMT_bec560c4f5b8664a1a1b9ce48bec1558e97da39171a99d9b9fd5ebb43db1c8cf phases=3 model=1 bus=80437005001990.1.2.3 kv=13.8 kw=75.0 daily=MT-Tipo1 vminpu=0.85
new load.UCMT_5f084a21d07060e5282a4d008160e7b7139c1b337b30506ebbe43f6546f33a3d phases=3 model=1 bus=80552435007258.1.2.3 kv=13.8 kw=225.0 daily=MT-Tipo1 vminpu=0.85
new load.UCMT_0c3a6de241f43cfeda5770dc69430f061ec9e273a1cb551adf318f21f4c312a8 phases=3 model=1 bus=80472425001997.1.2.3 kv=13.8 kw=800.0 daily=MT-Tipo1 vminpu=0.85
new load.UCMT_21476ab5bebad73e7fa665fbbedcf6e5d53f9bad7d4383cad710915fceff3726 phases=3 model=1 bus=80552445007258.1.2.3 kv=13.8 kw=75.0 daily=MT-Tipo1 vminpu=0.85
new load.UCMT_5cf6c27587c6d75707fe397be71ceec75cbcbd52f271abc879979a4870847d0c phases=3 model=1 bus=83506725002412.1.2.3 kv=13.8 kw=112.0 daily=MT-Tipo1 vminpu=0.85
new load.UCMT_9d6d73d3959d2dd80c430d4b16fd6c6d36f0675f6414220d9d1fbaaa4d1ec6c7 phases=3 model=1 bus=82577175002228.1.2.3 kv=13.8 kw=75.0 daily=MT-Tipo1 vminpu=0.85
new load.UCMT_48451a70fe9fb036bd1f178e802ac77f41f7eb907eb8863b38786a025687469b phases=3 model=1 bus=80475545001991.1.2.3 kv=13.8 kw=1250.0 daily=MT-Tipo1 vminpu=0.85
new load.UCMT_3ef5d2182eed3aacb8c1426492efed9e9c9c10c76dae7207414052d81987e4d6 phases=3 model=1 bus=80546205008497.1.2.3 kv=13.8 kw=150.0 daily=MT-Tipo5 vminpu=0.85
new load.UCMT_a33360eff4e525fead6ef2af436bfbb57ce704a960fd14796e44e1e1c276f89d phases=3 model=1 bus=80533325002210.1.2.3 kv=13.8 kw=500.0 daily=MT-Tipo5 vminpu=0.85
new load.UCMT_57507d9b202597c052c8d8ddb4210739c3dedb1110dc78bc7be6a8bd3d452670 phases=3 model=1 bus=81759735002148.1.2.3 kv=13.8 kw=225.0 daily=MT-Tipo5 vminpu=0.85
new load.UCMT_50ecedc6adbe2ac010d1f3aec2fde0a2aa85c85a23e14f1dd95e7880fffc61b2 phases=3 model=1 bus=80541215008498.1.2.3 kv=13.8 kw=75.0 daily=MT-Tipo5 vminpu=0.85
new load.UCMT_f400e451489071b99c5f7e6fed7b1ff62c84b19f939f195df80209b6c6e2304f phases=3 model=1 bus=98381835001993.1.2.3 kv=13.8 kw=1000.0 daily=MT-Tipo5 vminpu=0.85
new load.UCMT_e2146cab7ae442a8638afe8c54b78db56a761e15862b40e358871b4ce4007612 phases=3 model=1 bus=98381835001993.1.2.3 kv=13.8 kw=1000.0 daily=MT-Tipo1 vminpu=0.85
new load.UCMT_2781f18042e0fa08db53646f0f53d5a84c8ac44f38055cff1f3db1376990c745 phases=3 model=1 bus=82367915002409.1.2.3 kv=13.8 kw=150.0 daily=MT-Tipo5 vminpu=0.85
new load.UCMT_65d0aed119761c66793b9f8e5ed64fb90cf0a0a81483d352bc6b38ae2f22139c phases=3 model=1 bus=91622495001995.1.2.3 kv=13.8 kw=500.0 daily=MT-Tipo5 vminpu=0.85
new load.UCMT_6834dd60301e9c42aabc81a8a76df15e107c42fd02c52dc1c30f4123e6076b82 phases=3 model=1 bus=80472685002410.1.2.3 kv=13.8 kw=150.0 daily=MT-Tipo1 vminpu=0.85
new load.UCMT_9445bc6cf6813ddf0ab79d77be643bfaf63abdc2c68e600ffbbfc85102a2d7b8 phases=3 model=1 bus=82278545002413.1.2.3 kv=13.8 kw=3250.0 daily=MT-Tipo5 vminpu=0.85
new load.UCMT_1b898ea02299e33012ac00c03cf0680f032767921181fc26757d322ed210a9e4 phases=3 model=1 bus=80551535007258.1.2.3 kv=13.8 kw=75.0 daily=MT-Tipo1 vminpu=0.85
new load.UCMT_22125a4b28f122d4811b2c331597ab5fdbac18e2a94c97ccadf502f2d5e8e83d phases=3 model=1 bus=80481465001995.1.2.3 kv=13.8 kw=75.0 daily=MT-Tipo1 vminpu=0.85
new load.UCMT_9ab771f944518ba109a168ca76370dd980e7afcab1bf32e06d6fc49783e84116 phases=3 model=1 bus=82364905002409.1.2.3 kv=13.8 kw=500.0 daily=MT-Tipo1 vminpu=0.85
new load.UCMT_4833073e1a35e7e6c20ae3eaf743af0d8334b8feb246248f78c6d7d62e4b9a8e phases=3 model=1 bus=80457505002412.1.2.3 kv=13.8 kw=225.0 daily=MT-Tipo5 vminpu=0.85
new load.UCMT_affa0dcc6da083c2ee7eb23e69b133052c8accfbb000770cc8d14a062d084ee3 phases=3 model=1 bus=80523965001995.1.2.3 kv=13.8 kw=75.0 daily=MT-Tipo1 vminpu=0.85
new load.UCMT_8798e285aa4a4ac8527c170a776b34b828a8373fdd870e34c697c5208905d300 phases=3 model=1 bus=88722975001992.1.2.3 kv=13.8 kw=150.0 daily=MT-Tipo1 vminpu=0.85
new load.UCMT_6881df8acf6a8deeff0793152efc81f97b762a0989e361a72113b4a39d95e495 phases=3 model=1 bus=82371595002409.1.2.3 kv=13.8 kw=112.0 daily=MT-Tipo5 vminpu=0.85
new load.UCMT_48e35468e1205ea65e7380d525cd70255ca909f6f0a4e318739333427f4f526c phases=3 model=1 bus=80452045002412.1.2.3 kv=13.8 kw=750.0 daily=MT-Tipo5 vminpu=0.85
new load.UCMT_329d981fcbb1d90c9a7c0b4bfc7b0c67d645b24800749104a8f26a91e456e458 phases=3 model=1 bus=82285785002211.1.2.3 kv=13.8 kw=75.0 daily=MT-Tipo1 vminpu=0.85
new load.UCMT_eca6e74fe40257c51748881aa310cfd58ea22c6d24ae3e3117a3f7516add5245 phases=3 model=1 bus=82280415002413.1.2.3 kv=13.8 kw=75.0 daily=MT-Tipo5 vminpu=0.85
new load.UCMT_31fab3e3d2397014e1efd855a19cb64f21c87c834e7c403e7c3c0d13d3bca813 phases=3 model=1 bus=98042805001993.1.2.3 kv=13.8 kw=2000.0 daily=MT-Tipo5 vminpu=0.85
new load.UCMT_917325f4697dbd8657c06c4478b8d6163b89cc7ea805a2b586c86d75e16b4688 phases=3 model=1 bus=99337765001992.1.2.3 kv=13.8 kw=150.0 daily=MT-Tipo1 vminpu=0.85
new load.UCMT_2d1c5b120e417c0546f7963999823dde76376d3d48f11441e3b1af75c07d59d4 phases=3 model=1 bus=82275865002413.1.2.3 kv=13.8 kw=150.0 daily=MT-Tipo5 vminpu=0.85
new load.UCMT_622b1877e322882015cd7825ee2b6dc2cbbb7147ff814a5f6fb590478433f393 phases=3 model=1 bus=80468475001993.1.2.3 kv=13.8 kw=112.0 daily=MT-Tipo1 vminpu=0.85
new load.UCMT_b07c34892f3ac442559bcf7799a1cb74666e4ea045187a58170b92d5c41df332 phases=3 model=1 bus=82583535002228.1.2.3 kv=13.8 kw=112.0 daily=MT-Tipo1 vminpu=0.85
new load.UCMT_663e3b413c86124cedea257e790ec691d211a30962d99953c42e4aa40245a29d phases=3 model=1 bus=80485285001996.1.2.3 kv=13.8 kw=1750.0 daily=MT-Tipo1 vminpu=0.85
new load.UCMT_895abce52f276d826245960b948c8571e60a1abb1f44d6ea01039ff1d4232e6e phases=3 model=1 bus=98381835001993.1.2.3 kv=13.8 kw=1000.0 daily=MT-Tipo5 vminpu=0.85
new load.UCMT_ef90c20677a5e8a2c4fe9d8481bdd6f0cc11b2cd38ab5fe088176db1eee33544 phases=3 model=1 bus=98381835001993.1.2.3 kv=13.8 kw=1000.0 daily=MT-Tipo5 vminpu=0.85
new load.UCMT_89afa2bff64a22edaf6ddfc2cdfba7569374e24fa4e3c3a038dd669f49d9a468 phases=3 model=1 bus=82198995002188.1.2.3 kv=13.8 kw=112.0 daily=MT-Tipo5 vminpu=0.85
new load.UCMT_fd80ec19185c4a2d33b2f8a81211cd49eb74ae4ddd5b28aed6fd825acd94419d phases=3 model=1 bus=80522115001995.1.2.3 kv=13.8 kw=112.0 daily=MT-Tipo5 vminpu=0.85
new load.UCMT_ebd6696e98fecfe097faf429e59d12e128e96606f2e4399a7a5075b0bed5f0d9 phases=3 model=1 bus=80548565008497.1.2.3 kv=13.8 kw=150.0 daily=MT-Tipo5 vminpu=0.85
new load.UCMT_d7125ae06dfdf301ba7a51ce3ac1f35a600008d69ff3554e2db9abbef9f2cac7 phases=3 model=1 bus=88961975008500.1.2.3 kv=13.8 kw=500.0 daily=MT-Tipo5 vminpu=0.85
new load.UCMT_9f40fc6b098c601127d674ad31820d4672863452382e8be7e558bf3823e3d61f phases=3 model=1 bus=82588295002228.1.2.3 kv=13.8 kw=300.0 daily=MT-Tipo5 vminpu=0.85
new load.UCMT_274f832cf65f0080dcd7da8ec75d5e0ae21e3fba84e3e676d8047787d9193803 phases=3 model=1 bus=87521025007258.1.2.3 kv=13.8 kw=500.0 daily=MT-Tipo5 vminpu=0.85
new load.UCMT_1b77377e9414e166ed90a50f33f045f811325056a223af821900bf6b6869eeae phases=3 model=1 bus=80465985007257.1.2.3 kv=13.8 kw=1500.0 daily=MT-Tipo5 vminpu=0.85
new load.UCMT_4720e7106ac8ae244ac3ce1b52a863607d8eab96dd9b592cccad1f0fec1b6932 phases=3 model=1 bus=80446825001991.1.2.3 kv=13.8 kw=112.0 daily=MT-Tipo5 vminpu=0.85
new load.UCMT_8496910f7801af4fe5e4771adc347f8dfe02057ef1f1a16e97be2e5aae795a06 phases=3 model=1 bus=98381835001993.1.2.3 kv=13.8 kw=1000.0 daily=MT-Tipo1 vminpu=0.85
new load.UCMT_483ad40ac3c5a55326ce47402102831da05ad1f00dec6f303769ae57a7f745b5 phases=3 model=1 bus=80472785001994.1.2.3 kv=13.8 kw=300.0 daily=MT-Tipo1 vminpu=0.85
new load.UCMT_5edba5f9db22eca05c595e04e9f2689eb58a2fa1ab710c196faac6e7844cefdc phases=3 model=1 bus=81767035002148.1.2.3 kv=13.8 kw=150.0 daily=MT-Tipo5 vminpu=0.85
new load.UCMT_6660dc31b38045f959ed5a0cd9f510d7148ba3814c2e2552f725768360882448 phases=3 model=1 bus=97161495002412.1.2.3 kv=13.8 kw=150.0 daily=MT-Tipo1 vminpu=0.85
new load.UCMT_8c0578ad9afe6ad025c5568539b337042425a8029c88a210daf3cd5f05da8e81 phases=3 model=1 bus=80451575002412.1.2.3 kv=13.8 kw=2000.0 daily=MT-Tipo1 vminpu=0.85
new load.UCMT_a23b353827060ff86777c8fcd408aa47c78677285556ccb0f874516aad61783f phases=3 model=1 bus=80536605002210.1.2.3 kv=13.8 kw=2000.0 daily=MT-Tipo9 vminpu=0.85
new load.UCMT_f741ad9dd86b7a11523ab61d2e28551a0b5e6f5beb5f2c9c2eba008d7dbe2ad1 phases=3 model=1 bus=82588285002228.1.2.3 kv=13.8 kw=150.0 daily=MT-Tipo1 vminpu=0.85
new load.UCMT_d48e345bc95c9d407a0a6663ca248afb5e90fa2c529e9e8c08e04b27f9de295f phases=3 model=1 bus=82209215002188.1.2.3 kv=13.8 kw=225.0 daily=MT-Tipo9 vminpu=0.85
new load.UCMT_7049f605560e472130586efc5f6e70dea429d973402c47332f3e16803e279b8f phases=3 model=1 bus=93507245001996.1.2.3 kv=13.8 kw=500.0 daily=MT-Tipo1 vminpu=0.85
new load.UCMT_63c70bec771ad8258c53d50e51ee68e44d1dcd3b1275af5f8a24b81e8e8152f8 phases=3 model=1 bus=80471485001993.1.2.3 kv=13.8 kw=300.0 daily=MT-Tipo8 vminpu=0.85
new load.UCMT_e32ba25b10702112374dcf99266a5e4322acb83f5c311deb709bb390aaae0b78 phases=3 model=1 bus=80540765002210.1.2.3 kv=13.8 kw=225.0 daily=MT-Tipo5 vminpu=0.85
new load.UCMT_f4427d8e994a9287eb35af98255b38a4511dca6c4aa4802759ef65ff0d6b910d phases=3 model=1 bus=80526975002413.1.2.3 kv=13.8 kw=150.0 daily=MT-Tipo5 vminpu=0.85
new load.UCMT_9c2dab39e160b341c040795b959744eba3ca46b07b371274d2472f35dbca6e34 phases=3 model=1 bus=80459105002412.1.2.3 kv=13.8 kw=150.0 daily=MT-Tipo1 vminpu=0.85
new load.UCMT_a45d381310a1e79f832ccf266f3255d5250e96ee83456b74d328b602cc13c83d phases=3 model=1 bus=82301225002211.1.2.3 kv=13.8 kw=500.0 daily=MT-Tipo8 vminpu=0.85
new load.UCMT_e6880ea9a3f060ae0e4f49c550b82b9d66ae0054b5022ce208cfb73919333f04 phases=3 model=1 bus=85965855001993.1.2.3 kv=13.8 kw=225.0 daily=MT-Tipo5 vminpu=0.85
new load.UCMT_e08460d7d139c8f9ef5d9221c5c97975dac8e9289d1005154493fa803559a78a phases=3 model=1 bus=86998135001993.1.2.3 kv=13.8 kw=2750.0 daily=MT-Tipo5 vminpu=0.85
new load.UCMT_026f65c7ac7ec6c859003d7fb01f71f910bf72440b9a9ac5a5073ceedb4c70fe phases=3 model=1 bus=80515805001998.1.2.3 kv=13.8 kw=2000.0 daily=MT-Tipo5 vminpu=0.85
new load.UCMT_47da2f55233be748a9bc40029bc9285cb91208bf79a1771ec01061a0c8ab2abe phases=3 model=1 bus=91228885002188.1.2.3 kv=13.8 kw=300.0 daily=MT-Tipo8 vminpu=0.85
new load.UCMT_4cb42801f4cfad0ddc26b80a225d2a7dd676fbca66b7079c198497b46df5d88c phases=3 model=1 bus=80470545007257.1.2.3 kv=13.8 kw=500.0 daily=MT-Tipo5 vminpu=0.85
new load.UCMT_fcfdd3433f892d90fb14c7a641f5a713e935184242f68b4cfa15a70384c9edbc phases=3 model=1 bus=80550375002410.1.2.3 kv=13.8 kw=112.0 daily=MT-Tipo5 vminpu=0.85
new load.UCMT_3c310cb71e00231f80080b40a7f4008202cf27440125d23a693ccc40bd8b0743 phases=3 model=1 bus=83863035001995.1.2.3 kv=13.8 kw=150.0 daily=MT-Tipo7 vminpu=0.85
new load.UCMT_a17f8e06042e52f486e5038a2e4fa31e5702d345e5adf3854140095711c4f47f phases=3 model=1 bus=80538325007257.1.2.3 kv=13.8 kw=75.0 daily=MT-Tipo7 vminpu=0.85
new load.UCMT_a769394eb405db6834a0f638d0db3be12e937f9fbc8d25fa2458ce27eac66926 phases=3 model=1 bus=80441425008500.1.2.3 kv=13.8 kw=500.0 daily=MT-Tipo1 vminpu=0.85
new load.UCMT_fdf0c9b81d840436df256d141a05d9f9306006cbd337cb2688740e9eba0f0022 phases=3 model=1 bus=80485285001996.1.2.3 kv=13.8 kw=1750.0 daily=MT-Tipo7 vminpu=0.85
new load.UCMT_d910a100afc6144be2daeeec419e5bef66ff52d959a804a3192dbc727f704529 phases=3 model=1 bus=89709555001995.1.2.3 kv=13.8 kw=225.0 daily=MT-Tipo7 vminpu=0.85
new load.UCMT_dd7859bdef25f37366c3e7be558764b0823e7b6c95e3898709935d573758d99c phases=3 model=1 bus=80536985007257.1.2.3 kv=13.8 kw=1000.0 daily=MT-Tipo5 vminpu=0.85
new load.UCMT_61f88c2233e463baab1d1b89fbd72c65bdb61fcd9abca05acc74cba02d054fde phases=3 model=1 bus=80519515007259.1.2.3 kv=13.8 kw=300.0 daily=MT-Tipo8 vminpu=0.85
new load.UCMT_c5b82244f9d12d1087a6a9e1c5c62c402dd7ebb43d21f5ad973248ac5e1fa2f3 phases=3 model=1 bus=90143545001995.1.2.3 kv=13.8 kw=225.0 daily=MT-Tipo5 vminpu=0.85
new load.UCMT_a0833923018788e5f39e4623737e72bcbee64528074e448ac19cf8847b6193c5 phases=3 model=1 bus=80532955002210.1.2.3 kv=13.8 kw=225.0 daily=MT-Tipo5 vminpu=0.85
new load.UCMT_2f9cc225702dd77cc604a85bf736cb11a7305eb2019ee720e0b540e20c3f6153 phases=3 model=1 bus=80470935007257.1.2.3 kv=13.8 kw=750.0 daily=MT-Tipo5 vminpu=0.85
new load.UCMT_b2883ab48874c8753f7b6f85eb64c3dc1377f97cc89dba26a27b3cd56c8298da phases=3 model=1 bus=82569745001990.1.2.3 kv=13.8 kw=2500.0 daily=MT-Tipo1 vminpu=0.85
new load.UCMT_19b69b2ec92f00358d4e9e5cd9271dfda1b0387cb89f3cf4b2739416ce1460e7 phases=3 model=1 bus=80500405001996.1.2.3 kv=13.8 kw=500.0 daily=MT-Tipo5 vminpu=0.85
new load.UCMT_4b29818e5aa33a49a80e65103a95e8271c989ed1c970641c0560511202895026 phases=3 model=1 bus=80535715002210.1.2.3 kv=13.8 kw=1000.0 daily=MT-Tipo5 vminpu=0.85
new load.UCMT_9aa8b374e4d489d581cc4e8611455a94dbce9fa828292a33dc80a7647b844bcb phases=3 model=1 bus=80473485001994.1.2.3 kv=13.8 kw=225.0 daily=MT-Tipo1 vminpu=0.85
new load.UCMT_b5b78bb57489066c0150df5a27e172b392490c58f765ab3bfa0ac4b160a44920 phases=3 model=1 bus=80468945001993.1.2.3 kv=13.8 kw=1250.0 daily=MT-Tipo5 vminpu=0.85
new load.UCMT_f725903ab96b0040a5ea5aa6afcf17b1962a11f2113afec5ba6ded1ab2b486ec phases=3 model=1 bus=83122135001995.1.2.3 kv=13.8 kw=300.0 daily=MT-Tipo1 vminpu=0.85
new load.UCMT_0a2c4cd6511091f9e3acf60ee0b39e4ed25b367b570acd8d372ec58fdc144f63 phases=3 model=1 bus=98381835001993.1.2.3 kv=13.8 kw=1000.0 daily=MT-Tipo5 vminpu=0.85
new load.UCMT_8162dcdb66f3e05c3d7b4124292241c0f5ea74669e98716972b0b5f3aa1356bf phases=3 model=1 bus=80485285001996.1.2.3 kv=13.8 kw=1750.0 daily=MT-Tipo5 vminpu=0.85
new load.UCMT_abc3b86bd2eda36059b3e7555e8c326cb960daf4365ca699ed084f03f2e60133 phases=3 model=1 bus=98381835001993.1.2.3 kv=13.8 kw=1000.0 daily=MT-Tipo8 vminpu=0.85
new load.UCMT_cf1be3fb6e7f4e7787337641f84369bc267abd07fb6e3fd6197fd941b079472a phases=3 model=1 bus=83506455001992.1.2.3 kv=13.8 kw=300.0 daily=MT-Tipo5 vminpu=0.85
new load.UCMT_3ab81f5abb7f83497095eb8e45886938b2d811983fe7342fbfa507af6724f643 phases=3 model=1 bus=80553775007258.1.2.3 kv=13.8 kw=500.0 daily=MT-Tipo5 vminpu=0.85
new load.UCMT_2e8be9eb8df88f0799efebf0535ef98edd11da5fa548d285f8f76c20b0d4f70b phases=3 model=1 bus=80469035001993.1.2.3 kv=13.8 kw=300.0 daily=MT-Tipo1 vminpu=0.85
new load.UCMT_f9f6705b1d9aa5ef30f6d28e81b200437f03cd02618fd965f9ab03ac63ec1193 phases=3 model=1 bus=82320135002211.1.2.3 kv=13.8 kw=225.0 daily=MT-Tipo9 vminpu=0.85
new load.UCMT_200e0589f7da81ff32031d0c52730ee2883410e3a48f8143da31fb1a99eb6e45 phases=3 model=1 bus=81759635002148.1.2.3 kv=13.8 kw=112.0 daily=MT-Tipo8 vminpu=0.85
new load.UCMT_ce855681fdea0c48d956b59fac20f1a85342bab4eb1f48cdbbc4bd4bca4f6e78 phases=3 model=1 bus=84891245001992.1.2.3 kv=13.8 kw=112.0 daily=MT-Tipo1 vminpu=0.85
new load.UCMT_02ed1595d17521437c1c60999e28c1118df730d3c988a7a29fef93d48fe57a3e phases=3 model=1 bus=81767415007258.1.2.3 kv=13.8 kw=112.0 daily=MT-Tipo8 vminpu=0.85
new load.UCMT_2006f84cd0826dd815bf0f2bceb5f9bd220cc77ecfd3b002f9995c22da48ae63 phases=3 model=1 bus=82378945002409.1.2.3 kv=13.8 kw=75.0 daily=MT-Tipo5 vminpu=0.85
new load.UCMT_4160c373e72a40184cbc9b52f44e7deed3e3f60116135269b629c259cc850248 phases=3 model=1 bus=83143835002228.1.2.3 kv=13.8 kw=500.0 daily=MT-Tipo9 vminpu=0.85
new load.UCMT_ba10a40cf2eb51ba02e7265ce3b31aea420e1d9e04f18b43ec7d3a29fd4d0a2a phases=3 model=1 bus=80500735001996.1.2.3 kv=13.8 kw=225.0 daily=MT-Tipo9 vminpu=0.85
new load.UCMT_75bfe772f1a192c2f99a5b95a2d89e6a8cae2c7b03dd593fb9ea3446bbd3b9aa phases=3 model=1 bus=82905185007257.1.2.3 kv=13.8 kw=112.0 daily=MT-Tipo5 vminpu=0.85
new load.UCMT_624103f6c233968d7fe455bf026474fc2955fd4f78579a700257a2d293746e08 phases=3 model=1 bus=80500405001996.1.2.3 kv=13.8 kw=500.0 daily=MT-Tipo7 vminpu=0.85
new load.UCMT_bb0c76c9abc813d076a3be2851c9dc88e640222a2bb4b720c69c1bff6ab84a04 phases=3 model=1 bus=82581325002228.1.2.3 kv=13.8 kw=150.0 daily=MT-Tipo5 vminpu=0.85
new load.UCMT_e317ff4150c73ac8943f860608905c913d9447e2cd99a4d6ab1fbbe81e8791d3 phases=3 model=1 bus=80500595001996.1.2.3 kv=13.8 kw=75.0 daily=MT-Tipo1 vminpu=0.85
new load.UCMT_9b57d85a24bd4ffd520cfbc466f509c8ee257151f2ac2e034d74c98b75b0082b phases=3 model=1 bus=80439775001990.1.2.3 kv=13.8 kw=112.0 daily=MT-Tipo5 vminpu=0.85
new load.UCMT_73b3f0cfc57fb1091af58ba5cc5e60ff4d8057dbe41d6cf662b706914436e6f2 phases=3 model=1 bus=83509545002210.1.2.3 kv=13.8 kw=150.0 daily=MT-Tipo8 vminpu=0.85
new load.UCMT_25bd3b4663e788b14141559e39e5ce51a10c85e94e2f68cc4ff9aae4b0830cb0 phases=3 model=1 bus=83140935001992.1.2.3 kv=13.8 kw=4000.0 daily=MT-Tipo9 vminpu=0.85
new load.UCMT_2da266f1b71313d21c41b82d46dc58decce3c03deda34a0988fcd5b3236be46b phases=3 model=1 bus=80470395001993.1.2.3 kv=13.8 kw=3500.0 daily=MT-Tipo5 vminpu=0.85
new load.UCMT_3f05f9c36ef521b60485f5471cb3adc331a42da13735106cc960f5575398fee5 phases=3 model=1 bus=83167765002228.1.2.3 kv=13.8 kw=500.0 daily=MT-Tipo1 vminpu=0.85
new load.UCMT_bd63b129d3270feeb588c67198dafb32d7b03a40ecf550ee9874073af1434da8 phases=3 model=1 bus=91974565002210.1.2.3 kv=13.8 kw=112.0 daily=MT-Tipo5 vminpu=0.85
new load.UCMT_09250b61e5b9542fb1f0acf3b235cf05cc12e174c46310d0fd6316a0372dd94c phases=3 model=1 bus=80479375002410.1.2.3 kv=13.8 kw=300.0 daily=MT-Tipo9 vminpu=0.85
new load.UCMT_859c24a6a720a24accfb980d528b61d9cd78c05653e711f6f1530bbbb48662f5 phases=3 model=1 bus=88159885002148.1.2.3 kv=13.8 kw=225.0 daily=MT-Tipo5 vminpu=0.85
new load.UCMT_7c7169ad6a0bea26ff864249f49e48b4c0631df2e5a3774f877d134d15fe8383 phases=3 model=1 bus=83059935002409.1.2.3 kv=13.8 kw=5000.0 daily=MT-Tipo5 vminpu=0.85
new load.UCMT_8b1932ede7d4b5caa1b88370490c9b2243967682e4f1d92e2a08f92843023e7b phases=3 model=1 bus=83295615007259.1.2.3 kv=13.8 kw=4000.0 daily=MT-Tipo9 vminpu=0.85
new load.UCMT_150393fd7c56c5963eaa03d8988a6dd7719e8ae63cefffe2877788c3a5e05a5d phases=3 model=1 bus=84846035001991.1.2.3 kv=13.8 kw=750.0 daily=MT-Tipo8 vminpu=0.85
new load.UCMT_ce751fefcb43589f44acedfab2ea8354531c49f1b467d39d8412e75e1867f484 phases=3 model=1 bus=80520235007259.1.2.3 kv=13.8 kw=225.0 daily=MT-Tipo5 vminpu=0.85
new load.UCMT_efecf23a8295fe74b1c9aaa6af096e0e9462fe6d7864f23911d817f8b827cef3 phases=3 model=1 bus=83142295001993.1.2.3 kv=13.8 kw=112.0 daily=MT-Tipo5 vminpu=0.85
new load.UCMT_6901aa4ceb2d19ffd6bffa8cf569fdb10267a7305ade01cacdb0853f87c1d819 phases=3 model=1 bus=80470395001993.1.2.3 kv=13.8 kw=3500.0 daily=MT-Tipo7 vminpu=0.85
new load.UCMT_b6ff5f2cb7f20eaae9ded098362f3de5e7e81a52e67d0dda32665318e0c2abfc phases=3 model=1 bus=82278545002413.1.2.3 kv=13.8 kw=3250.0 daily=MT-Tipo9 vminpu=0.85
new load.UCMT_13ee774b86d9f654670ca8deb7ae8b2f409a7e5f1e00f4288326303b1e22ac31 phases=3 model=1 bus=82278545002413.1.2.3 kv=13.8 kw=3250.0 daily=MT-Tipo5 vminpu=0.85
new load.UCMT_f9882ded84d7a71ae0dc0c5d5dc4bbe68f7cc247b56edea001e38370131e93cf phases=3 model=1 bus=83670805002148.1.2.3 kv=13.8 kw=500.0 daily=MT-Tipo9 vminpu=0.85
new load.UCMT_7a5eec9d4d42c7d4aa425ea674e8dfd4b24391892c0481830d357ab3e844be5b phases=3 model=1 bus=80466185002412.1.2.3 kv=13.8 kw=225.0 daily=MT-Tipo9 vminpu=0.85
new load.UCMT_f9010a241717b84efef5bc408365fa3d455e919f14e67edbb572531d22259c12 phases=3 model=1 bus=98028655001993.1.2.3 kv=13.8 kw=300.0 daily=MT-Tipo9 vminpu=0.85
new load.UCMT_702ff443c39342477f84c441f5e54864786f72e752505eb3908dd27c7b40bc62 phases=3 model=1 bus=98028655001993.1.2.3 kv=13.8 kw=300.0 daily=MT-Tipo7 vminpu=0.85
new load.UCMT_922dc252672fc81940d71d45f662b8b8069eb7f6f2c1e3a35adbf2fb451599c5 phases=3 model=1 bus=83621025002412.1.2.3 kv=13.8 kw=150.0 daily=MT-Tipo5 vminpu=0.85
new load.UCMT_09f43e5594a57b04721542ae20d5e3bff9f7911c70c987ae1545e9eb726ed3b8 phases=3 model=1 bus=86788645001996.1.2.3 kv=13.8 kw=300.0 daily=MT-Tipo8 vminpu=0.85
new load.UCMT_5c421df9c4a4217982f34b1d14dd780d8c98577ec54b9cde282c427c157a9613 phases=3 model=1 bus=85764525002409.1.2.3 kv=13.8 kw=599.0 daily=MT-Tipo9 vminpu=0.85
new load.UCMT_11e5caba61d88dc8cc93abd842cefd09ae59f1789de1d94e07003aac3499f61e phases=3 model=1 bus=80535625002210.1.2.3 kv=13.8 kw=500.0 daily=MT-Tipo9 vminpu=0.85
new load.UCMT_ca5cd8e7b93b1caee58f29741a5d31ccd4eec49cb5bc7b94ac13e730e3144a4d phases=3 model=1 bus=80482105001995.1.2.3 kv=13.8 kw=150.0 daily=MT-Tipo1 vminpu=0.85
new load.UCMT_e5d3af329dca982f2eee80d8f5add3f9bd2e4ecbdfebfa8ea08b162751d48ad7 phases=3 model=1 bus=87477465007258.1.2.3 kv=13.8 kw=112.0 daily=MT-Tipo2 vminpu=0.85
new load.UCMT_b69c86e4235055653f55f453f8d34dbf33b7452f683a5b28b8c01ca94efdbddb phases=3 model=1 bus=99056765002414.1.2.3 kv=13.8 kw=300.0 daily=MT-Tipo1 vminpu=0.85
new load.UCMT_9c2c82e868d553f2b2e9caa3e69445cf8f8637966a03de5d77f00fb0ae09e4a7 phases=3 model=1 bus=99101645007258.1.2.3 kv=13.8 kw=300.0 daily=MT-Tipo1 vminpu=0.85
new load.UCMT_b1dec53b679a492ecccd53eea9f40d4e474f4b87b5bf5532e3f7cb30b2329906 phases=3 model=1 bus=99612135002412.1.2.3 kv=13.8 kw=3000.0 daily=MT-Tipo1 vminpu=0.85
